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# Плата MainPower
# Конденсаторы
KЭ := 5  # Коэффициент зависящий от эксплутации (Железная дорога, механические (машины)
KП := 1  # Коэффициент зависящий от производства (Военная приемка)
Ea := 0.35  # Энергий активации
Nc := 15
C_Table := READPRN("..\MAIN-POWER\ExportMatcad\CMainPower.txt")  # Получение таблицы из  exsel
C_Table = [
    1, 11, 1, 1, 11, 5, 2, 1, 1, 1, 6, 1, 1, 1, 2;
    5623413, 3098504, 3098504, 30000, 3098504, 25090, 3098504, 30000, 3098504, 30000, 525913, 3098504, 3098504, 3098504, 525913;
    1.78e-7, 3.23e-7, 3.23e-7, 3.3333e-5, 3.23e-7, 3.986e-5, 3.23e-7, 3.3333e-5, 3.23e-7, 3.3333e-5, 2e-9, 3.23e-7, 3.23e-7, 3.23e-7, 2e-9;
    0.00047, 1e-7, 1e-8, 1e-10, 1e-6, 4.7e-6, 3.3e-8, 2.7e-10, 5.6e-8, 1.5e-10, 4.7e-5, 4.7e-8, 2.2e-9, 2.7e-9, 2.2e-6;
    50, 50, 50, 100, 100, 100, 100, 100, 100, 100, 16, 100, 100, 100, 16;
    30, 30, 30, 15, 15, 30, 30, 3.6, 3.6, 3.6, 3.6, 12.1, 3.6, 3.6, 5.1;
    35, 35, 35, 35, 35, 35, 35, 35, 35, 35, 35, 35, 35, 35, 35
]
# Коэффициент нагрузки конденсатора
KH :=
    for i ∈ 0 .. Nc - 1
        K[0, i] ← C_Table[5, i]/C_Table[4, i]
    K
KH = [0.6, 0.6, 0.6, 0.15, 0.15, 0.3, 0.3, 0.036, 0.036, 0.036, 0.225, 0.121, 0.036, 0.036, 0.31875]
# Коэффициент режима работы, зависящей от электрической нагрузки
KP :=
    for i ∈ 0 .. Nc - 1
        if i == 0
            A ← 3.59*10^-2
            B ← 4.09
            Nt ← 358
            G ← 5.9
            Ns ← 0.55
            H ← 3
            K[0, i] ← A*((KH[0, i]/Ns)^H + 1)*exp(B*((C_Table[6, i] + 273)/Nt)^G)
            i ← i + 1
        A ← 5.909*10^-7
        B ← 14.3
        Nt ← 398
        G ← 1
        Ns ← 0.3
        H ← 3
        K[0, i] ← A*((KH[0, i]/Ns)^H + 1)*exp(B*((C_Table[6, i] + 273)/Nt)^G)
    K
KP = [0.444339, 0.340254, 0.340254, 0.0425318, 0.0425318, 0.075612, 0.075612, 0.0378713, 0.0378713, 0.0378713, 0.0537554, 0.0402866, 0.0378713, 0.0378713, 0.0831529]
# Температурный коэффициент
KT :=
    for i ∈ 0 .. Nc - 1
        K[0, i] ← 1/exp(-Ea/(8.617*10^5)*(1/(C_Table[6, i] + 273) - 1/298))
    K
KT = [1, 1, 1, 1, 1, 1, 1, 1, 1, 1, 1, 1, 1, 1, 1]
# Расчет коэффициента зависящего от номинальной емкости
KC :=
    for i ∈ 0 .. Nc - 1
        if i == 0
            x ← C_Table[3, i]*10^6
            K[0, i] ← 0.2*x^0.23
            i ← i + 1
        x ← C_Table[3, i]*10^12
        K[0, i] ← 0.4*x^0.12
    K
KC = [0.823403, 1.59243, 1.20798, 0.69512, 2.09923, 2.52762, 1.39406, 0.783112, 1.4854, 0.729778, 3.33205, 1.45449, 1.00728, 1.03234, 2.30755]
# Интесивность отказов для одного элемента, с учетом коэффициентов
λC :=
    for i ∈ 0 .. Nc - 1
        λ[0, i] ← C_Table[0, i]*C_Table[2, i]*KP[0, i]*KC[0, i]*KЭ*KП
    λ
λC = [3.25624e-7, 9.62561e-6, 6.63798e-7, 4.9274e-6, 1.58613e-6, 0.000190449, 3.40467e-7, 4.94286e-6, 9.08502e-8, 4.60623e-6, 1.07469e-8, 9.46335e-8, 6.16075e-8, 6.31403e-8, 3.83759e-9]
λ_C := sum(λC) = 0.000217792
1/λ_C = 4591.53
## Микросхемы
Nm := 5
Kкор := 3
DD_Table := READPRN("..\MAIN-POWER\ExportMatcad\DMainPower.txt")  # Получение таблицы из  exsel
Kэ := 5  # Коэффициент зависящий от эксплутации (Железная дорога, механические (машины)
Kп := 1  # Коэффициент зависящий от производства (Военная приемка)
# Колличество в схеме
#
# Время наработки до отказа
# Интенсивность отказа
#
# Рабочая температура
# Придельная температура
#
# Рабочее напряжение
# Придельное напряжение
# Колличество элементов
# Kv
DD_Table = [
    5, 1, 2, 3, 1;
    35714286, 35714286, 35714286, 35714286, 35714286;
    2.8e-8, 2.8e-8, 2.8e-8, 2.8e-8, 2.8e-8;
    35, 35, 35, 35, 35;
    150, 125, 150, 150, 125;
    14, 1, 1.5, 14, 0.5;
    15, 15, 3, 15, 0.8;
    100, 100, 100, 1000, 100;
    1, 1, 1, 10, 1
]
## Температурный коэффициент К_t
Kt(Nm) :=
    B ← 0.023
    for i ∈ 0 .. Nm - 1
        K[0, i] ← exp(B*(DD_Table[3, i] - 25))
    K
Kt(Nm) = [1.2586, 1.2586, 1.2586, 1.2586, 1.2586]
## Коэфициент нагрузки К_н
Kобл(Nm) :=
    for i ∈ 0 .. Nm - 1
        K[0, i] ← DD_Table[5, i]/DD_Table[6, i]
    K
Kобл(Nm) = [0.933333, 0.0666667, 0.5, 0.933333, 0.625]
## Коэффициент, зависящий от коэффициента нагрузки К_p
Kp(Nm) :=
    B ← 0.023
    for i ∈ 0 .. Nm - 1
        t[0, i] ← DD_Table[3, i] + 30
        K[0, i] ← 0.045*exp(3.1*Kобл(Nm)[0, i])*exp(B*(t[0, i] - 25))
    K
Kp(Nm) = [2.03855, 0.138841, 0.53201, 2.03855, 0.783807]
## Коэффициент, зависящий от количества элементов микросхемы К_ис
Kис(Nm) :=
    A ← 0.478
    S ← 0.253
    for i ∈ 0 .. Nm - 1
        K[0, i] ← A*DD_Table[7, i]^S
    K
Kис(Nm) = [1.5326, 1.5326, 1.5326, 2.74428, 1.5326]
## Интесивность отказов для группы элемента, с учетом коэффициентов
λd :=
    for i ∈ 0 .. Nm - 1
        λ[0, i] ← DD_Table[0, i]*DD_Table[2, i]*Kt(Nm)[0, i]*Kис(Nm)[0, i]*Kкор*DD_Table[8, i]*Kэ*Kп
    λ
λd = [4.05075e-6, 8.10149e-7, 1.6203e-6, 4.35197e-5, 8.10149e-7]
λ_DD := sum(λd) = 5.08111e-5
1/λ_DD = 19680.8
## Предохранители
FU_Table := READPRN("..\MAIN-POWER\ExportMatcad\FUMainPower.txt")  # Получение таблицы из  exsel
FU_Table = [5; 90909091; 1.1e-8; 35]
λFU[0, 0] := FU_Table[2, 0]*FU_Table[0, 0]*(0.061*FU_Table[3, 0] - 0.525)*Kэ*Kп = 4.4275e-7
λ_FU := sum(λFU) = 4.4275e-7
## Катушка индкутивности
L_Table := READPRN("..\MAIN-POWER\ExportMatcad\LMainPower.txt")  # Получение таблицы из  exsel
L_Table = [1, 1; 100000000, 100000000; 1e-8, 1e-8; 1.5, 1.5; 9, 4.5; 35, 35]
## Коэффициент нагрузки К_н
L_KH :=
    for i ∈ 0 .. 1
        K[0, i] ← L_Table[3, i]/L_Table[4, i]
    K
L_KH = [0.166667, 0.333333]
## Коэффициент зависящий от коэффициента нагрузки К_р
L_KP :=
    for i ∈ 0 .. 1
        K[0, i] ← 0.46 + 0.012*(50 - L_Table[5, i])^1.3 + 0.54*L_KH[0, i]^3.5*exp(0.2*(50 - L_Table[5, i])^0.8)
    K
L_KP = [0.871448, 0.931747]
λL :=
    for i ∈ 0 .. 1
        λ[0, i] ← L_Table[2, i]*L_Table[0, i]*L_KP[0, i]*Kэ*Kп
    λ
λL = [4.35724e-8, 4.65874e-8]
λ_L := sum(λL) = 9.01598e-8
## Рeзисторы
N_R := 15
R_Table := READPRN("..\MAIN-POWER\ExportMatcad\RMainPower.txt")
R_Table = [
    9, 9, 2, 5, 2, 5, 1, 1, 2, 1, 3, 2, 1, 15, 6;
    29411765, 29411765, 29411765, 29411765, 29411765, 29411765, 29411765, 29411765, 29411765, 29411765, 29411765, 29411765, 29411765, 29411765, 29411765;
    3.4e-8, 3.4e-8, 3.4e-8, 3.4e-8, 3.4e-8, 3.4e-8, 3.4e-8, 3.4e-8, 3.4e-8, 3.4e-8, 3.4e-8, 3.4e-8, 3.4e-8, 3.4e-8, 3.4e-8;
    1, 0.25, 0.25, 0.25, 0.1, 0.1, 0.25, 0.25, 0.25, 0.1, 0.1, 0.1, 0.1, 0.1, 0.1;
    0.015, 0.0396, 0.036, 0.0784, 0.036, 0.0504, 0.01, 0.015, 0.225, 0.0036, 0.0036, 0.0036, 0.0036, 0.07, 0.07;
    35, 35, 35, 35, 35, 35, 35, 35, 35, 35, 35, 35, 35, 35, 35;
    0.5, 0.5, 0.5, 0.5, 0.5, 0.5, 0.5, 0.5, 0.5, 0.5, 0.5, 0.5, 0.5, 0.5, 0.5
]
## Коэффициент нагрузки К_н
R_KH(N_R) :=
    for i ∈ 0 .. N_R - 1
        K[0, i] ← R_Table[4, i]/R_Table[3, i]
    K
R_KH(N_R) = [0.015, 0.1584, 0.144, 0.3136, 0.36, 0.504, 0.04, 0.06, 0.9, 0.036, 0.036, 0.036, 0.036, 0.7, 0.7]
R_KP(N_R) :=
    A ← 0.06
    B ← 1.616
    Nt ← 328
    G ← 2.746
    Ns ← 0.622
    J ← 1.198
    H ← 0.770
    for i ∈ 0 .. N_R - 1
        K[0, i] ← A*exp(B*((R_Table[5, i] + 273)/Nt)^G)*exp(((R_KH(N_R)[0, i]/Ns)*((R_Table[5, i] + 273)/273)^J)^H)
    K
R_KP(N_R) = [0.248996, 0.345094, 0.335704, 0.451964, 0.486652, 0.604563, 0.267484, 0.28106, 1.0322, 0.264682, 0.264682, 0.264682, 0.264682, 0.794801, 0.794801]
λR :=
    for i ∈ 0 .. N_R - 1
        λ[0, i] ← R_Table[2, i]*R_Table[0, i]*R_KP(N_R)[0, i]*R_Table[6, i]*Kэ*Kп
    λ
λ_R := sum(λR) = 2.84161e-6
1/λ_R = 351913
λR = [1.90482e-7, 2.63997e-7, 5.70696e-8, 1.92085e-7, 8.27308e-8, 2.56939e-7, 2.27361e-8, 2.38901e-8, 1.75475e-7, 2.2498e-8, 6.7494e-8, 4.4996e-8, 2.2498e-8, 1.01337e-6, 4.05349e-7]
## Оптоэлектронная микросхема
U_Table := READPRN("..\MAIN-POWER\ExportMatcad\UMainPower.txt")
U_Table = [4; 5263158; 1.9e-7; 35]
λU[0, 0] := U_Table[2, 0]*U_Table[0, 0]*Kэ*Kп = 3.8e-6
1/λ_U =  # error: Эта переменная неопределена.
λ_U := sum(λU) = 3.8e-6
## Диоды
N_VD := 6
VD_Table := READPRN("..\MAIN-POWER\ExportMatcad\VDMainPower.txt")
VD_Table = [
    7, 1, 1, 2, 1, 4;
    243902439, 243902439, 243902439, 10989011, 40000000, 243902439;
    4.1e-9, 4.1e-9, 4.1e-9, 9.1e-8, 9.1e-8, 9.1e-8;
    0.005, 0.152, 75, 5, 0.45, 169;
    0.001, 0.001, 30, 0.0075, 0.001, 50;
    1, 1, 1, 1.5, 1, 1.5;
    1, 1, 1, 1, 0.6, 1;
    35, 35, 35, 35, 35, 35
]
VD_KH(N_VD) :=
    for i ∈ 0 .. N_VD - 1
        K[0, i] ← VD_Table[4, i]/VD_Table[3, i]
    K
VD_KH(N_VD) = [0.2, 0.00657895, 0.4, 0.0015, 0.00222222, 0.295858]
VD_KP(N_VD) :=
    for i ∈ 0 .. N_VD - 1
        if i ≤ 3
            A ← 2.193
            Nt ← -800
            Tm ← 448
            L ← 14.0
            Δt ← 150
            K[0, i] ← A*exp(Nt/(273 + VD_Table[7, i] + Δt*VD_KH(N_VD)[0, i]) + ((273 + VD_Table[7, i] + Δt*VD_KH(N_VD)[0, i])/Tm)^L)
            i ← i + 1
        A ← 44.1025
        Nt ← -2138
        Tm ← 448
        L ← 17.7
        Δt ← 150
        K[0, i] ← A*exp(Nt/(273 + VD_Table[7, i] + Δt*VD_KH(N_VD)[0, i]) + ((273 + VD_Table[7, i] + Δt*VD_KH(N_VD)[0, i])/Tm)^L)
    K
VD_KP(N_VD) = [0.209668, 0.165576, 0.265812, 0.164489, 0.0430155, 0.103669]
VD_KU(N_VD) :=
    for i ∈ 0 .. N_VD - 1
        K[0, i] ← 1/(2.11 - 1.11*VD_KH(N_VD)[0, i]) if VD_KH(N_VD)[0, i] > 0.6
        K[0, i] ← 0.7
    K
VD_KU(N_VD) = [0.7, 0.7, 0.7, 0.7, 0.7, 0.7]
λVD :=
    for i ∈ 0 .. N_VD - 1
        if i < 4
            λ[0, i] ← VD_Table[2, i]*VD_Table[0, i]*VD_KP(N_VD)[0, i]*Kэ*Kп
            i ← i + 1
    λ[0, i] ← VD_Table[2, i]*VD_Table[0, i]*VD_KP(N_VD)[0, i]*VD_Table[5, i]*VD_Table[6, i]*VD_KU(N_VD)[0, i]*Kэ*Kп
    λ
λVD(N_VD) =  # error: Это значение должно быть функцией, , но имеет форму: [Unitless].
λ_VD := sum(λVD) = 3.86728e-7
1/λ_VD = 2585798
## Транзисторы
N_VT := 3
VT_Table := READPRN("..\MAIN-POWER\ExportMatcad\VTMainPower.txt")
VT_Table = [
    2, 1, 4;
    409500410, 409500410, 409500410;
    2e-9, 2e-9, 2e-9;
    13.6, 300, 3.8;
    0.015, 0.015, 0.00012;
    0.7, 0.7, 0.7;
    35, 35, 35
]
VT_KH(N_VT) :=
    for i ∈ 0 .. N_VT - 1
        K[0, i] ← VT_Table[4, i]/VT_Table[3, i]
    K
VT_KH(N_VT) = [0.00110294, 5e-5, 3.15789e-5]
VT_KP(N_VT) :=
    A ← 5.2
    Nt ← -1162
    Tm ← 448
    L ← 13.8
    Δt ← 150
    for i ∈ 0 .. N_VT - 1
        K[0, i] ← A*exp(Nt/(273 + VT_Table[6, i] + Δt*VT_KH(N_VT)[0, i]) + ((273 + VT_Table[6, i] + Δt*VT_KH(N_VT)[0, i])/Tm)^L)
    K
VT_KP(N_VT) = [0.120474, 0.120236, 0.120232]
λVT :=
    for i ∈ 0 .. N_VT - 1
        λ[0, i] ← VT_Table[2, i]*VT_Table[0, i]*VT_KP(N_VT)[0, i]*VT_Table[5, i]*Kэ*Kп
    λ
λVT = [1.68664e-9, 8.41655e-10, 3.36651e-9]
λ_VT := sum(λVT) = 5.8948e-9
1/λ_VT = 169641099
## Разъемы
t_p := 30
X_Table := READPRN("..\MAIN-POWER\ExportMatcad\XMainPower.txt")
X_Table = [8; 96153846; 1.04e-8; 15; 10; 2; 35; 1000]
K_H := X_Table[4, 0]/X_Table[3, 0] = 0.666667
K_P := exp(9000*(1/(298 + t_p) - 1/(273 + X_Table[6, 0] + t_p*exp(-1.8*(1 - K_H))))) = 0.741559
K_K := exp((0.1*(X_Table[5, 0] - 1))^0.51064) = 1.36148
K_n := 0.32*exp(0.0028*X_Table[7, 0]) = 5.26229
λX[0, 0] := X_Table[0, 0]*X_Table[2, 0]*K_P*K_K*K_n*Kэ*Kп = 2.21017e-6
λ_X := sum(λX) = 2.21017e-6
## Соединения пайкой
t := 35
K_t := 0.061*t - 0.525 = 1.61
λ_Xp := 0.000069*10^-6*22*K_t*Kэ*Kп = 1.22199e-8
## Плата
PL_Table := READPRN("..\MAIN-POWER\ExportMatcad\Plata.txt")
PL_Table = [1.7e-11; 4; 622; 0; 35]
λPL[0, 0] := PL_Table[0, 0]*(PL_Table[2, 0]*PL_Table[1, 0] + PL_Table[3, 0]*(PL_Table[1, 0] + 13))*(0.061*PL_Table[4, 0] - 0.525)*Kэ*Kп = 3.40483e-7
λ_PL := sum(λPL) = 3.40483e-7
λ_VT = 5.8948e-9
λ_X = 2.21017e-6
λ_Xp = 1.22199e-8
λ_VD = 3.86728e-7
λ_R = 2.84161e-6
λ_U = 3.8e-6
λ_C = 0.000217792
λ_DD = 5.08111e-5
λ_FU = 4.4275e-7
λ_L = 9.01598e-8
λ_PL = 3.40483e-7
λ := λ_C + λ_DD + λ_FU + λ_L + λ_R + λ_U + λ_VD + λ_VT + λ_X + λ_Xp + λ_PL = 0.000278734
1/λ = 3587.66
