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# Плата Контроллер оптики
# Конденсаторы
KЭ := 5  # Коэффициент зависящий от эксплутации (Железная дорога, механические (машины)
KП := 1  # Коэффициент зависящий от производства (Военная приемка)
Ea := 0.35  # Энергий активации
Nc := 7
C_Table := READPRN("../Контроллер оптики 2/ExportMathcad/COptic.txt")  # Получение таблицы из  exsel
C_Table = [
    1, 4, 1, 21, 3, 2, 1;
    5780347, 525913, 3098504, 3098504, 3098505, 3098506, 3098507;
    1.73e-7, 3.23e-7, 3.23e-7, 3.23e-7, 3.23e-7, 3.23e-7, 3.23e-7;
    0.00022, 0.00022, 2.2e-6, 2.2e-7, 1e-7, 2.2e-7, 1e-11;
    25, 25, 16, 50, 50, 50, 50;
    12.5, 12, 12, 15, 12, 3.6, 15;
    35, 35, 35, 35, 35, 35, 35
]
# Коэффициент нагрузки конденсатора
KH(Nc) :=
    for i ∈ 0 .. Nc - 1
        K[0, i] ← C_Table[5, i]/C_Table[4, i]
    K
KH(Nc) = [0.5, 0.48, 0.75, 0.3, 0.24, 0.072, 0.3]
# Коэффициент режима работы, зависящей от электрической нагрузки
KP(Nc) :=
    for i ∈ 0 .. Nc - 1
        if i < 1
            A ← 3.59*10^-2
            B ← 4.09
            Nt ← 358
            G ← 5.9
            Ns ← 0.55
            H ← 3
            K[0, i] ← A*((KH(Nc)[0, i]/Ns)^H + 1)*exp(B*((C_Table[6, i] + 273)/Nt)^G)
            i ← i + 1
        A ← 5.909*10^-7
        B ← 14.3
        Nt ← 398
        G ← 1
        Ns ← 0.3
        H ← 3
        K[0, i] ← A*((KH(Nc)[0, i]/Ns)^H + 1)*exp(B*((C_Table[6, i] + 273)/Nt)^G)
    K
KP(Nc) = [0.338592, 0.192659, 0.628525, 0.075612, 0.0571627, 0.0383286, 0.075612]
# Температурный коэффициент
KT(Nc) :=
    for i ∈ 0 .. Nc - 1
        K[0, i] ← 1/exp(-Ea/(8.617*10^5)*(1/(C_Table[6, i] + 273) - 1/298))
    K
KT(Nc) = [1, 1, 1, 1, 1, 1, 1]
# Расчет коэффициента зависящего от номинальной емкости
KC(Nc) :=
    for i ∈ 0 .. Nc - 1
        if i < 1
            x ← C_Table[3, i]*10^6
            K[0, i] ← 0.2*x^0.23
            i ← i + 1
        x ← C_Table[3, i]*10^12
        K[0, i] ← 0.4*x^0.12
    K
KC(Nc) = [0.691492, 4.01006, 2.30755, 1.75045, 1.59243, 1.75045, 0.527303]
# Интесивность отказов для одного элемента, с учетом коэффициентов
λC(Nc) :=
    for i ∈ 0 .. Nc - 1
        λ[0, i] ← C_Table[0, i]*C_Table[2, i]*KP(Nc)[0, i]*KC(Nc)[0, i]*KЭ*KП
    λ
λC(Nc) = [2.02526e-7, 4.99084e-6, 2.34232e-6, 4.48883e-6, 4.41028e-7, 2.16709e-7, 6.43907e-8]
λ_C := sum(λC(Nc)) = 1.27466e-5
1/λ_C = 78452.1
## Микросхемы
Nm := 7
Kкор := 3
DD_Table := READPRN("../Контроллер оптики/ExportMathcad/DOptic.txt")  # Получение таблицы из  exsel
Kэ := 5  # Коэффициент зависящий от эксплутации (Железная дорога, механические (машины)
Kп := 1  # Коэффициент зависящий от производства (Военная приемка)
# Колличество в схеме
# Время наработки до отказа
#
# Интенсивность отказа
#
# Рабочая температура
# Придельная температура
#
# Рабочее напряжение
# Придельное напряжение
#
# Колличество элементов в микросхеме
# Kv
DD_Table = [
    1, 1, 1, 1, 1, 1, 3;
    43478261, 35714286, 35714286, 35714286, 35714286, 35714286, 35714286;
    2.3e-8, 2.8e-8, 2.8e-8, 2.8e-8, 2.8e-8, 2.8e-8, 2.8e-8;
    35, 35, 35, 35, 35, 35, 35;
    85, 85, 85, 85, 85, 125, 125;
    29, 0.014, 14, 0.5, 0.5, 15, 15;
    36, 0.9, 60, 0.8, 0.8, 52, 35;
    10000, 100, 100, 100, 100, 100, 100;
    1, 1, 1, 1, 1, 1, 1
]
## Температурный коэффициент К_t
Kt(Nm) :=
    for i ∈ 0 .. Nm - 1
        if i == 0
            B ← 0.021
            K[0, i] ← exp(B*(DD_Table[3, i] - 25))
        B ← 0.023
        K[0, i] ← exp(B*(DD_Table[3, i] - 25))
    K
Kt(Nm) = [1.2586, 1.2586, 1.2586, 1.2586, 1.2586, 1.2586, 1.2586]
## Коэфициент нагрузки К_н
Kобл(Nm) :=
    for i ∈ 0 .. Nm - 1
        K[0, i] ← DD_Table[5, i]/DD_Table[6, i]
    K
Kобл(Nm) = [0.805556, 0.0155556, 0.233333, 0.625, 0.625, 0.288462, 0.428571]
## Коэффициент, зависящий от коэффициента нагрузки К_p
Kp(Nm) :=
    B ← 0.023
    for i ∈ 0 .. Nm - 1
        t[0, i] ← DD_Table[3, i] + 30
        K[0, i] ← 0.045*exp(3.1*Kобл(Nm)[0, i])*exp(B*(t[0, i] - 25))
    K
Kp(Nm) = [1.37181, 0.118497, 0.232757, 0.783807, 0.783807, 0.276136, 0.426339]
## Коэффициент, зависящий от количества элементов микросхемы К_ис
Kис(Nm) :=
    for i ∈ 0 .. Nm - 1
        if i == 0
            A ← 0.336
            S ← 0.288
            B ← 0.021
            K[0, i] ← A*32^S
            i ← i + 1
        A ← 0.478
        S ← 0.253
        B ← 0.021
        K[0, i] ← A*DD_Table[7, i]^S
    K
Kис(Nm) = [0.911638, 1.5326, 1.5326, 1.5326, 1.5326, 1.5326, 1.5326]
## Интесивность отказов для группы элемента, с учетом коэффициентов
λd(Nm) :=
    for i ∈ 0 .. Nm - 1
        λ[0, i] ← DD_Table[0, i]*DD_Table[2, i]*Kt(Nm)[0, i]*Kис(Nm)[0, i]*Kкор*DD_Table[8, i]*Kэ*Kп
    λ
λd(Nm) = [3.95849e-7, 8.10149e-7, 8.10149e-7, 8.10149e-7, 8.10149e-7, 8.10149e-7, 2.43045e-6]
λ_DD := sum(λd(Nm)) = 6.87704e-6
1/λ_DD = 145411
## Катушка индкутивности
N_L := 1
L_Table := READPRN("../Контроллер оптики 2/ExportMathcad/LOptic.txt")  # Получение таблицы из  exsel
L_Table = [1; 100000000; 1e-8; 0.0275; 0.8; 35]
## Коэффициент нагрузки К_н
L_KH :=
    for i ∈ 0 .. N_L - 1
        K[0, i] ← L_Table[3, i]/L_Table[4, i]
    K
L_KH = [0.034375]
## Коэффициент зависящий от коэффициента нагрузки К_р
L_KP :=
    for i ∈ 0 .. N_L - 1
        K[0, i] ← 0.46 + 0.012*(50 - L_Table)[5, i]^1.3 + 0.54*L_KH[0, i]*exp(0.2*(50 - L_Table)[5, i]^0.8)
    K
L_KP = [0.971935]
λ_L := L_Table[2, 0]*L_Table[0, 0]*L_KP[0, 0]*Kэ = 4.85967e-8
1/λ_L = 20577512
## Рeзисторы
N_R := 8
R_Table := READPRN("../Контроллер оптики 2/ExportMathcad/ROptic.txt")
R_Table = [
    1, 2, 2, 2, 16, 6, 2, 1;
    25000, 25000, 25000, 25000, 25000, 25000, 25000, 25000;
    3.4e-8, 3.4e-8, 3.4e-8, 3.4e-8, 3.4e-8, 3.4e-8, 3.4e-8, 3.4e-8;
    0.1, 0.1, 0.1, 0.1, 0.1, 0.1, 0.1, 0.1;
    0.0504, 0.036, 0.0504, 0.0504, 0.07, 0.0504, 0.0504, 0.0504;
    35, 35, 35, 35, 35, 35, 35, 35;
    0.5, 0.5, 0.5, 0.5, 0.5, 0.5, 0.5, 0.5
]
## Коэффициент нагрузки К_н
R_KH(N_R) :=
    for i ∈ 0 .. N_R - 1
        K[0, i] ← R_Table[4, i]/R_Table[3, i]
    K
R_KH(N_R) = [0.504, 0.36, 0.504, 0.504, 0.7, 0.504, 0.504, 0.504]
R_KP(N_R) :=
    A ← 0.06
    B ← 1.616
    Nt ← 328
    G ← 2.746
    Ns ← 0.622
    J ← 1.198
    H ← 0.770
    for i ∈ 0 .. N_R - 1
        K[0, i] ← A*exp(B*((R_Table[5, i] + 273)/Nt)^G)*exp(((R_KH(N_R)[0, i]/Ns)*((R_Table[5, i] + 273)/273)^J)^H)
    K
R_KP(N_R) = [0.604563, 0.486652, 0.604563, 0.604563, 0.794801, 0.604563, 0.604563, 0.604563]
λR(N_R) :=
    for i ∈ 0 .. N_R - 1
        λ[0, i] ← R_Table[2, i]*R_Table[0, i]*R_KP(N_R)[0, i]*R_Table[6, i]*Kэ*Kп
    λ
λ_R := sum(λR(N_R)) = 1.88309e-6
1/λ_R = 531042
λR(N_R) = [5.13878e-8, 8.27308e-8, 1.02776e-7, 1.02776e-7, 1.08093e-6, 3.08327e-7, 1.02776e-7, 5.13878e-8]
## Диоды
N_VD := 3
VD_Table := READPRN("../Контроллер оптики 2/ExportMathcad/VDOptic.txt")
VD_Table = [
    2, 2, 2;
    243902439, 243902439, 40000000;
    4.1e-9, 4.1e-9, 2.5e-8;
    0.151515, 80, 0.45;
    0.014, 0.01, 0.1;
    1, 1, 1;
    1, 2, 0.6;
    35, 35, 35
]
VD_KH(N_VD) :=
    for i ∈ 0 .. N_VD - 1
        K[0, i] ← VD_Table[4, i]/VD_Table[3, i]
    K
VD_KH(N_VD) = [0.0924, 0.000125, 0.222222]
VD_KP(N_VD) :=
    for i ∈ 0 .. N_VD - 1
        if i ≤ 1
            A ← 2.193
            Nt ← -800
            Tm ← 448
            L ← 14.0
            Δt ← 150
            K[0, i] ← A*exp(Nt/(273 + VD_Table[7, i] + Δt*VD_KH(N_VD)[0, i]) + ((273 + VD_Table[7, i] + Δt*VD_KH(N_VD)[0, i])/Tm)^L)
            i ← i + 1
        A ← 44.1025
        Nt ← -2138
        Tm ← 448
        L ← 17.7
        Δt ← 150
        K[0, i] ← A*exp(Nt/(273 + VD_Table[7, i] + Δt*VD_KH(N_VD)[0, i]) + ((273 + VD_Table[7, i] + Δt*VD_KH(N_VD)[0, i])/Tm)^L)
    K
VD_KP(N_VD) = [0.184423, 0.164195, 0.0846666]
VD_KU(N_VD) :=
    for i ∈ 0 .. N_VD - 1
        K[0, i] ← 1/(2.11 - 1.11*VD_KH(N_VD)[0, i]) if VD_KH(N_VD)[0, i] > 0.6
        K[0, i] ← 0.7
    K
VD_KU(N_VD) = [0.7, 0.7, 0.7]
λVD(N_VD) :=
    for i ∈ 0 .. N_VD - 1
        if i ≤ 1
            λ[0, i] ← VD_Table[2, i]*VD_Table[0, i]*VD_KP(N_VD)[0, i]*Kэ*Kп
            i ← i + 1
    λ[0, i] ← VD_Table[2, i]*VD_Table[0, i]*VD_KP(N_VD)[0, i]*VD_Table[5, i]*VD_Table[6, i]*VD_KU(N_VD)[0, i]*Kэ*Kп
    λ
λVD(N_VD) = [7.56135e-9, 6.732e-9, 8.89e-9]
λ_VD := sum(λVD(N_VD)) = 2.31833e-8
1/λ_VD = 43134409
## Разъемы
t_p := 30
N_X := 2
X_Table := READPRN("../Контроллер оптики 2/ExportMathcad/XOptic.txt")
X_Table = [7, 2; 96153846, 96153846; 1.04e-8, 1.04e-8; 3, 2; 3, 1; 3, 6; 35, 35; 1000, 1000]
K_H :=
    for i ∈ 0 .. N_X - 1
        K[0, i] ← X_Table[4, i]/X_Table[3, i]
    K
K_H = [1, 0.5]
K_P :=
    for i ∈ 0 .. N_X - 1
        K[0, i] ← exp(9000*(1/(298 + t_p) - 1/(273 + X_Table[6, i] + t_p*exp(-1.8*(1 - K_H[0, i])))))
    K
K_P = [2.25197, 0.512393]
K_K :=
    for i ∈ 0 .. N_X - 1
        K[0, i] ← exp((0.1*(X_Table[5, i] - 1))^0.51064)
    K
K_K = [1.55212, 2.0176]
K_n :=
    for i ∈ 0 .. N_X - 1
        K[0, i] ← 0.32*exp(0.0028*X_Table[7, i])
    K
K_n = [5.26229, 5.26229]
λX :=
    for i ∈ 0 .. N_X - 1
        λ[0, i] ← X_Table[0, i]*X_Table[2, i]*K_P[0, i]*K_K[0, i]*K_n[0, i]*Kэ*Kп
    λ
λX = [6.6952e-6, 5.65779e-7]
λ_X := sum(λX) = 7.26098e-6
## Резонатор
Z_Table := READPRN("../Контроллер оптики 2/ExportMathcad/ZOptic.txt")
Z_Table = [1; 38461538; 2.6e-8; 35]
Kt_t := exp(0.017*Z_Table[3, 0]) = 1.81303
λ_Z := Z_Table[0, 0]*Z_Table[2, 0]*Kt_t*Kэ*Kп = 2.35694e-7
## Плата
PL_Table := READPRN("../Контроллер оптики 2/ExportMathcad/Plata.txt")
PL_Table = [1.7e-11; 4; 291; 0; 35]
λ_PL := PL_Table[0, 0]*(PL_Table[2, 0]*PL_Table[1, 0] + PL_Table[3, 0]*(PL_Table[1, 0] + 13))*(0.061*PL_Table[4, 0] - 0.525)*Kэ*Kп = 1.59293e-7
λ_R = 1.88309e-6
λ_X = 7.26098e-6
λ_VD = 2.31833e-8
λ_C = 1.27466e-5
λ_DD = 6.87704e-6
λ_L = 4.85967e-8
λ_PL = 1.59293e-7
λ := λ_C + λ_DD + λ_L + λ_R + λ_VD + λ_X + λ_Z + λ_PL = 2.92345e-5
1/λ = 34206.1
