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# Плата Контроллер Преобразования
# Конденсаторы
KЭ := 5  # Коэффициент зависящий от эксплутации (Железная дорога, механические (машины)
KП := 1  # Коэффициент зависящий от производства (Военная приемка)
Ea := 0.35  # Энергий активации
Nc := 9
C_Table := READPRN("..\Контроллер преобразования\ExportMathcad\CController.txt")  # Получение таблицы из  exsel
C_Table = [
    4, 4, 4, 5, 17, 21, 1, 1, 4;
    1687024, 2811707, 2811707, 26330, 3098504, 3095975, 30000, 2973600, 300000;
    1.73e-7, 1.73e-7, 1.73e-7, 8e-9, 3.23e-7, 3.23e-7, 3.3333e-5, 3.36e-7, 3.333e-6;
    0.00022, 0.00022, 2.2e-5, 2.2e-6, 1e-7, 1e-6, 5.6e-10, 4.7e-9, 2.2e-11;
    50, 25, 25, 63, 50, 50, 100, 100, 100;
    45, 20, 20, 53, 45, 45, 80, 80, 80;
    35, 35, 35, 35, 35, 35, 35, 35, 35
]
# Коэффициент нагрузки конденсатора
KH(Nc) :=
    for i ∈ 0 .. Nc - 1
        K[0, i] ← C_Table[5, i]/C_Table[4, i]
    K
KH(Nc) = [0.9, 0.8, 0.8, 0.84127, 0.9, 0.9, 0.8, 0.8, 0.8]
# Коэффициент режима работы, зависящей от электрической нагрузки
KP(Nc) :=
    for i ∈ 0 .. Nc - 1
        if i ≤ 2
            A ← 3.59*10^-2
            B ← 4.09
            Nt ← 358
            G ← 5.9
            Ns ← 0.55
            H ← 3
            K[0, i] ← A*((KH(Nc)[0, i]/Ns)^H + 1)*exp(B*((C_Table[6, i] + 273)/Nt)^G)
            i ← i + 1
        if i == 3
            A ← 9.583*10^-3
            B ← 2.5
            Nt ← 358
            G ← 18
            Ns ← 0.4
            H ← 5
            K[0, i] ← A*((KH(Nc)[0, i]/Ns)^H + 1)*exp(B*((C_Table[6, i] + 273)/Nt)^G)
            i ← i + 1
        A ← 5.909*10^-7
        B ← 14.3
        Nt ← 398
        G ← 1
        Ns ← 0.3
        H ← 3
        K[0, i] ← A*((KH(Nc)[0, i]/Ns)^H + 1)*exp(B*((C_Table[6, i] + 273)/Nt)^G)
    K
KP(Nc) = [1.04047, 0.788305, 0.788305, 0.477207, 1.05857, 1.05857, 0.75472, 0.75472, 0.75472]
# Температурный коэффициент
KT(Nc) :=
    for i ∈ 0 .. Nc - 1
        K[0, i] ← 1/exp(-Ea/(8.617*10^5)*(1/(C_Table[6, i] + 273) - 1/298))
    K
KT(Nc) = [1, 1, 1, 1, 1, 1, 1, 1, 1]
# Расчет коэффициента зависящего от номинальной емкости
KC(Nc) :=
    for i ∈ 0 .. Nc - 1
        if i ≤ 2
            x ← C_Table[3, i]*10^6
            K[0, i] ← 0.2*x^0.23
            i ← i + 1
        if i == 3
            x ← C_Table[3, i]*10^6
            K[0, i] ← x^0.05
            i ← i + 1
        x ← C_Table[3, i]*10^12
        K[0, i] ← 0.4*x^0.12
    K
KC(Nc) = [0.691492, 0.691492, 0.407181, 1.04021, 1.59243, 2.09923, 0.854757, 1.10335, 0.57963]
# Интесивность отказов для одного элемента, с учетом коэффициентов
λC(Nc) :=
    for i ∈ 0 .. Nc - 1
        λ[0, i] ← C_Table[0, i]*C_Table[2, i]*KP(Nc)[0, i]*KC(Nc)[0, i]*KЭ*KП
    λ
λC(Nc) = [2.48939e-6, 1.88607e-6, 1.1106e-6, 9.9279e-8, 4.62807e-5, 7.53652e-5, 0.000107516, 1.39896e-6, 2.9161e-5]
λ_C := sum(λC(Nc)) = 0.000265307
1/λ_C = 3769.22
## Микросхемы
Nm := 6
Kкор := 3
DD_Table := READPRN("..\Контроллер преобразования\ExportMathcad\DController.txt")  # Получение таблицы из  exsel
Kэ := 5  # Коэффициент зависящий от эксплутации (Железная дорога, механические (машины)
Kп := 1  # Коэффициент зависящий от производства (Военная приемка)
# Колличество в схеме
#
# Время наработки до отказа
# Интенсивность отказа
#
# Рабочая температура
# Придельная температура
#
# Рабочее напряжение
# Придельное напряжение
# Колличество элементов
# Kv
DD_Table = [
    4, 4, 5, 1, 1, 4;
    35714286, 35714286, 35714286, 35714286, 35714286, 35714286;
    2.8e-8, 2.8e-8, 2.8e-8, 2.8e-8, 2.8e-8, 2.8e-8;
    35, 35, 35, 35, 35, 35;
    85, 85, 85, 125, 85, 125;
    18, 18, 35, 30, 40, 30;
    18, 18, 35, 30, 40, 30;
    100, 100, 100, 100, 100, 100;
    1, 1, 1, 1, 1, 1
]
## Температурный коэффициент К_t
Kt(Nm) :=
    B ← 0.023
    for i ∈ 0 .. Nm - 1
        K[0, i] ← exp(B*(DD_Table[3, i] - 25))
    K
Kt(Nm) = [1.2586, 1.2586, 1.2586, 1.2586, 1.2586, 1.2586]
## Коэфициент нагрузки К_н
Kобл(Nm) :=
    for i ∈ 0 .. Nm - 1
        K[0, i] ← DD_Table[5, i]/DD_Table[6, i]
    K
Kобл(Nm) = [1, 1, 1, 1, 1, 1]
## Коэффициент, зависящий от коэффициента нагрузки К_p
Kp(Nm) :=
    B ← 0.023
    for i ∈ 0 .. Nm - 1
        t[0, i] ← DD_Table[3, i] + 30
        K[0, i] ← 0.045*exp(3.1*Kобл(Nm)[0, i])*exp(B*(t[0, i] - 25))
    K
Kp(Nm) = [2.50655, 2.50655, 2.50655, 2.50655, 2.50655, 2.50655]
## Коэффициент, зависящий от количества элементов микросхемы К_ис
Kис(Nm) :=
    A ← 0.478
    S ← 0.253
    for i ∈ 0 .. Nm - 1
        K[0, i] ← A*DD_Table[7, i]^S
    K
Kис(Nm) = [1.5326, 1.5326, 1.5326, 1.5326, 1.5326, 1.5326]
## Интесивность отказов для группы элемента, с учетом коэффициентов
λd(Nm) :=
    for i ∈ 0 .. Nm - 1
        λ[0, i] ← DD_Table[0, i]*DD_Table[2, i]*Kt(Nm)[0, i]*Kис(Nm)[0, i]*Kкор*DD_Table[8, i]*Kэ*Kп
    λ
λd(Nm) = [3.2406e-6, 3.2406e-6, 4.05075e-6, 8.10149e-7, 8.10149e-7, 3.2406e-6]
λ_DD := sum(λd(Nm)) = 1.53928e-5
1/λ_DD = 64965.3
## Катушка индкутивности
N_L := 1
L_Table := READPRN("..\Контроллер преобразования\ExportMathcad\LController.txt")  # Получение таблицы из  exsel
L_Table = [1; 100000000; 1e-8; 2.6; 2.6; 35]
## Коэффициент нагрузки К_н
L_KH :=
    for i ∈ 0 .. N_L - 1
        K[0, i] ← L_Table[3, i]/L_Table[4, i]
    K
L_KH = [1]
## Коэффициент зависящий от коэффициента нагрузки К_р
L_KP :=
    for i ∈ 0 .. N_L - 1
        K[0, i] ← 0.46 + 0.012*((-L_Table)[5, i] + 50)^1.3 + 0.54*L_KH[0, i]*exp(0.2*((-L_Table)[5, i] + 50)^0.8)
    K
L_KP = [3.95893]
λ_L := L_Table[2, 0]*L_Table[0, 0]*L_KP[0, 0]*Kэ*Kп = 1.97946e-7
1/λ_L = 5051876
## Рeзисторы
N_R := 17
R_Table := READPRN("..\Контроллер преобразования\ExportMathcad\RController.txt")
R_Table = [
    1, 1, 1, 27, 1, 17, 10, 9, 9, 1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;
    5586592, 250000, 250000, 29411765, 29411765, 29411765, 29411765, 29411765, 29411765, 29411765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;
    1.79e-7, 4e-6, 4e-6, 3.4e-8, 3.4e-8, 3.4e-8, 3.4e-8, 3.4e-8, 3.4e-8, 3.4e-8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;
    0.5, 1, 1, 0.125, 0.125, 0.125, 0.125, 0.125, 0.125, 0.125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;
    0.25, 0.8, 0.1, 0.1, 0.1, 0.1, 0.1, 0.1, 0.015, 0.0125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;
    35, 35, 35, 35, 35, 35, 35, 35, 35, 35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;
    1, 1, 1, 0.5, 0.5, 0.5, 0.5, 0.5, 0.5, 0.5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]
## Коэффициент нагрузки К_н
R_KH(N_R) :=
    for i ∈ 0 .. N_R - 1
        K[0, i] ← R_Table[4, i]/R_Table[3, i]
    K
R_KH(N_R) = [0.5, 0.8, 0.1, 0.8, 0.8, 0.8, 0.8, 0.8, 0.12, 0.1, 1, 1, 0.28, 0.0288, 1, 1, 1]
R_KP(N_R) :=
    for i ∈ 0 .. N_R - 1
        if i == 0
            A ← 0.399
            B ← 1.5419
            Nt ← 343
            G ← 9.8965
            Ns ← 3.1668
            J ← 1.3071
            H ← 0.6012
            K[0, i] ← A*exp(B*((R_Table[5, i] + 273)/Nt)^G)*exp(((R_KH(N_R)[0, i]/Ns)*((R_Table[5, i] + 273)/273)^J)^H)
            i ← i + 1
        if i ≤ 2
            A ← 0.260
            B ← 0.5078
            Nt ← 343
            G ← 9.278
            Ns ← 0.878
            J ← 1
            H ← 0.886
            K[0, i] ← A*exp(B*((R_Table[5, i] + 273)/Nt)^G)*exp(((R_KH(N_R)[0, i]/Ns)*((R_Table[5, i] + 273)/273)^J)^H)
            i ← i + 1
        A ← 0.06
        B ← 1.616
        Nt ← 328
        G ← 2.746
        Ns ← 0.622
        J ← 1.198
        H ← 0.770
        K[0, i] ← A*exp(B*((R_Table[5, i] + 273)/Nt)^G)*exp(((R_KH(N_R)[0, i]/Ns)*((R_Table[5, i] + 273)/273)^J)^H)
    K
R_KP(N_R) = [0.975384, 0.873494, 0.368748, 0.907466, 0.907466, 0.907466, 0.907466, 0.907466, 0.320146, 0.307213, 1.17027, 1.17027, 0.427724, 0.259528, 1.17027, 1.17027, 1.17027]
λR(N_R) :=
    for i ∈ 0 .. N_R - 1
        if i == 0
            Ku ← sqrt(R_Table[3, i]*5000)
            λ[0, i] ← R_Table[2, i]*R_Table[0, i]*R_KP(N_R)[0, i]*R_Table[6, i]*Ku*Kэ*Kп
            i ← i + 1
        λ[0, i] ← R_Table[2, i]*R_Table[0, i]*R_KP(N_R)[0, i]*R_Table[6, i]*Kэ*Kп
    λ
λR(N_R) = [4.36484e-5, 1.74699e-5, 7.37496e-6, 2.08263e-6, 7.71346e-8, 1.31129e-6, 7.71346e-7, 6.94211e-7, 2.44912e-7, 2.61131e-8, 9.94731e-8, 9.94731e-8, 3.63566e-8, 2.20598e-8, 9.94731e-8, 9.94731e-8, 3.97892e-7]
λ_R := sum(λR(N_R)) = 7.45551e-5
1/λ_R = 13412.9
## Оптоэлектронная микросхема
N_U := 2
U_Table := READPRN("..\Контроллер преобразования\ExportMathcad\UController.txt")
U_Table = [5, 4; 35714286, 35714286; 2.8e-8, 2.8e-8; 100, 100]
λU(N_U) :=
    for i ∈ 0 .. N_U - 1
        λ[0, i] ← U_Table[2, i]*U_Table[0, i]*Kэ*Kп
    λ
λU(N_U) = [7e-7, 5.6e-7]
λ_U := sum(λU(N_U)) = 1.26e-6
1/λ_U = 793651
## Диоды
N_VD := 5
VD_Table := READPRN("..\Контроллер преобразования\ExportMathcad\VDController.txt")
VD_Table = [
    2, 2, 36, 1, 1;
    243902439, 40000000, 40000000, 29411765, 29411765;
    4.1e-9, 2.5e-8, 2.5e-8, 3.4e-8, 3.4e-8;
    0.0333333, 0.2, 1, 0.03, 0.03;
    0.0333333, 0.2, 1, 0.03, 0.03;
    1, 1, 1.5, 1, 1;
    0.6, 0.6, 0.6, 1, 1;
    35, 35, 35, 35, 35
]
VD_KH(N_VD) :=
    for i ∈ 0 .. N_VD - 1
        K[0, i] ← VD_Table[4, i]/VD_Table[3, i]
    K
VD_KH(N_VD) = [1, 1, 1, 1, 1]
VD_KP(N_VD) :=
    for i ∈ 0 .. N_VD - 1
        if i == 0
            A ← 2.1935
            Nt ← -800
            Tm ← 448
            L ← 14.0
            Δt ← 150
            K[0, i] ← A*exp(Nt/(273 + VD_Table[7, i] + Δt*VD_KH(N_VD)[0, i]) + ((273 + VD_Table[7, i] + Δt*VD_KH(N_VD)[0, i])/Tm)^L)
            i ← i + 1
        if i ≤ 2
            A ← 44.1025
            Nt ← -2138
            Tm ← 448
            L ← 17.7
            Δt ← 150
            K[0, i] ← A*exp(Nt/(273 + VD_Table[7, i] + Δt*VD_KH(N_VD)[0, i]) + ((273 + VD_Table[7, i] + Δt*VD_KH(N_VD)[0, i])/Tm)^L)
            i ← i + 1
        Ea ← 0.6
        k ← 8.625*10^-5
        m ← 1.5
        tp ← VD_Table[7, i] + VD_KH(N_VD)[0, i]*20
        tp0 ← 45
        K[0, i] ← (VD_KH(N_VD)[0, i]^m)*exp(Ea/k*(1/(tp0 + 273) - 1/(tp + 273)))
    K
VD_KP(N_VD) = [1.4932, 1.81571, 1.81571, 1.94828, 1.94828]
VD_KU(N_VD) :=
    for i ∈ 0 .. N_VD - 1
        K[0, i] ← 1/(2.11 - 1.11*VD_KH(N_VD)[0, i]) if VD_KH(N_VD)[0, i] > 0.6
        K[0, i] ← 0.7
    K
VD_KU(N_VD) = [0.7, 0.7, 0.7, 0.7, 0.7]
λVD(N_VD) :=
    for i ∈ 0 .. N_VD - 1
        if i == 0
            λ[0, i] ← VD_Table[0, i]*VD_Table[2, i]*VD_KP(N_VD)[0, i]*Kэ*Kп
            i ← i + 1
        if i < 3
            λ[0, i] ← VD_Table[0, i]*VD_Table[2, i]*VD_KP(N_VD)[0, i]*VD_Table[5, i]*VD_Table[6, i]*Kэ*Kп
            i ← i + 1
        λ[0, i] ← VD_Table[0, i]*VD_Table[2, i]*VD_KP(N_VD)[0, i]*Kэ*Kп
    λ
λVD(N_VD) = [6.12212e-8, 2.72356e-7, 7.35361e-6, 3.31208e-7, 3.31208e-7]
λ_VD := sum(λVD(N_VD)) = 8.3496e-6
1/λ_VD = 119766
## Транзисторы
N_VT := 1
VT_Table := READPRN("..\Контроллер преобразования\ExportMathcad\VTController.txt")
VT_Table = [4; 22727273; 4.4e-8; 0.625; 0.625; 1.5; 35]
VT_KH(N_VT) :=
    for i ∈ 0 .. N_VT - 1
        K[0, i] ← VT_Table[4, i]/VT_Table[3, i]
    K
VT_KH(N_VT) = [1]
VT_KP(N_VT) :=
    A ← 5.2
    Nt ← -1162
    Tm ← 448
    L ← 13.8
    Δt ← 150
    for i ∈ 0 .. N_VT - 1
        K[0, i] ← A*exp(Nt/(273 + VT_Table[6, i] + Δt*VT_KH(N_VT)[0, i]) + ((273 + VT_Table[6, i] + Δt*VT_KH(N_VT)[0, i])/Tm)^L)
    K
VT_KP(N_VT) = [1.5963]
λVT(N_VT) :=
    for i ∈ 0 .. N_VT - 1
        λ[0, i] ← VT_Table[2, i]*VT_Table[0, i]*VT_KP(N_VT)[0, i]*VT_Table[5, i]*Kэ*Kп
    λ
λVT(N_VT) = [2.10712e-6]
λ_VT := sum(λVT(N_VT)) = 2.10712e-6
1/λ_VT = 474582
## Разъемы
t_p := 30
N_X := 3
X_Table := READPRN("..\Контроллер преобразования\ExportMathcad\XController.txt")
X_Table = [
    1, 15, 1;
    96153846, 96153846, 96153846;
    1.04e-8, 1.04e-8, 1.04e-8;
    16, 5, 5;
    1, 2, 2;
    6, 2, 3;
    50, 50, 50;
    1000, 1000, 1000
]
K_H :=
    for i ∈ 0 .. N_X - 1
        K[0, i] ← X_Table[4, i]/X_Table[3, i]
    K
K_H = [0.0625, 0.4, 0.4]
K_P :=
    for i ∈ 0 .. N_X - 1
        K[0, i] ← exp(9000*(1/(298 + t_p) - 1/(273 + X_Table[6, i] + t_p*exp(-1.8*(1 - K_H[0, i])))))
    K
K_P = [1.04696, 1.53301, 1.53301]
K_K :=
    for i ∈ 0 .. N_X - 1
        K[0, i] ← exp((0.1*(X_Table[5, i] - 1))^0.51064)
    K
K_K = [2.0176, 1.36148, 1.55212]
K_n :=
    for i ∈ 0 .. N_X - 1
        K[0, i] ← 0.32*exp(0.0028*X_Table[7, i])
    K
K_n = [5.26229, 5.26229, 5.26229]
λX :=
    for i ∈ 0 .. N_X - 1
        λ[0, i] ← X_Table[0, i]*X_Table[2, i]*K_P[0, i]*K_K[0, i]*K_n[0, i]*Kэ*Kп
    λ
λX = [5.78019e-7, 8.56698e-6, 6.51102e-7]
λ_X := sum(λX) = 9.7961e-6
## Плата
PL_Table := READPRN("..\Контроллер преобразования\ExportMathcad\Plata.txt")
PL_Table = [1.7e-11; 4; 316; 0; 35]
λ_PL := PL_Table[0, 0]*(PL_Table[2, 0]*PL_Table[1, 0] + PL_Table[3, 0]*(PL_Table[1, 0] + 13))*(0.061*PL_Table[4, 0] - 0.525)*Kэ*Kп = 1.72978e-7
λ_VT = 2.10712e-6
λ_X = 9.7961e-6
λ_VD = 8.3496e-6
λ_R = 7.45551e-5
λ_U = 1.26e-6
λ_C = 0.000265307
λ_DD = 1.53928e-5
λ_L = 1.97946e-7
λ := λ_C + λ_DD + λ_L + λ_R + λ_U + λ_VD + λ_VT + λ_X + λ_PL = 0.000377139
P(t) := e^(-t*λ)
1/λ = 2651.54
P(365) = 0.871399
P(1819) = 0.503579
P(6000) = 0.104055
