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# Плата CAM
# Конденсаторы
KЭ := 5  # Коэффициент зависящий от эксплутации (Железная дорога, механические (машины)
KП := 1  # Коэффициент зависящий от производства (Военная приемка)
Ea := 0.35  # Энергий активации
Nc := 19
C_Table := READPRN("../Плата CAM/ExportMathcad/CCAM.txt")  # Получение таблицы из  exsel
C_Table = [
    1, 2, 9, 1, 2, 1, 5, 2, 1, 4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;
    10000, 3098504, 3098504, 3098504, 525913, 3098504, 25090, 3098504, 30000, 525913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;
    1.73e-7, 3.23e-7, 3.23e-7, 3.23e-7, 1.901e-6, 3.23e-7, 3.986e-5, 3.23e-7, 3.3333e-5, 1.901e-6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;
    0.00047, 1e-9, 1e-6, 2.2e-9, 2.2e-6, 2.7e-9, 4.7e-6, 1e-8, 1e-11, 1e-5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;
    50, 50, 100, 50, 16, 50, 100, 50, 100, 10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;
    4, 1.2, 30, 3.6, 3.6, 3.6, 30, 15, 3.6, 5.6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;
    35, 35, 35, 35, 35, 35, 35, 35, 35, 35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]
# Коэффициент нагрузки конденсатора
KH(Nc) :=
    for i ∈ 0 .. Nc - 1
        K[0, i] ← C_Table[5, i]/C_Table[4, i]
    K
KH(Nc) = [0.08, 0.024, 0.3, 0.072, 0.225, 0.072, 0.3, 0.3, 0.036, 0.56, 0.036, 0.072, 0.072, 0.705882, 0.072, 0.6, 0.15, 0.036, 0.036]
# Коэффициент режима работы, зависящей от электрической нагрузки
KP(Nc) :=
    for i ∈ 0 .. Nc - 1
        if i == 0
            A ← 3.59*10^-2
            B ← 4.09
            Nt ← 358
            G ← 5.9
            Ns ← 0.55
            H ← 3
            K[0, i] ← A*((KH(Nc)[0, i]/Ns)^H + 1)*exp(B*((C_Table[6, i] + 273)/Nt)^G)
            i ← i + 1
        A ← 5.909*10^-7
        B ← 14.3
        Nt ← 398
        G ← 1
        Ns ← 0.3
        H ← 3
        K[0, i] ← A*((KH(Nc)[0, i]/Ns)^H + 1)*exp(B*((C_Table[6, i] + 273)/Nt)^G)
    K
KP(Nc) = [0.193931, 0.0378254, 0.075612, 0.0383286, 0.0537554, 0.0383286, 0.075612, 0.075612, 0.0378713, 0.283707, 0.0378713, 0.0383286, 0.0383286, 0.530292, 0.0383286, 0.340254, 0.0425318, 0.0378713, 0.0378713]
# Температурный коэффициент
KT(Nc) :=
    for i ∈ 0 .. Nc - 1
        K[0, i] ← 1/exp(-Ea/(8.617*10^5)*(1/(C_Table[6, i] + 273) - 1/298))
    K
KT(Nc) = [1, 1, 1, 1, 1, 1, 1, 1, 1, 1, 1, 1, 1, 1, 1, 1, 1, 1, 1]
# Расчет коэффициента зависящего от номинальной емкости
KC(Nc) :=
    for i ∈ 0 .. Nc - 1
        if i == 0
            x ← C_Table[3, i]*10^6
            K[0, i] ← 0.2*x^0.23
            i ← i + 1
        x ← C_Table[3, i]*10^12
        K[0, i] ← 0.4*x^0.12
    K
KC(Nc) = [0.823403, 0.916347, 2.09923, 1.00728, 2.30755, 1.03234, 2.52762, 1.20798, 0.527303, 2.76732, 0.585714, 1.39406, 1.45449, 3.33205, 1.4854, 1.59243, 0.69512, 0.729778, 0.783112]
# Интесивность отказов для одного элемента, с учетом коэффициентов
λC(Nc) :=
    for i ∈ 0 .. Nc - 1
        λ[0, i] ← C_Table[0, i]*C_Table[2, i]*KP(Nc)[0, i]*KC(Nc)[0, i]*KЭ*KП
    λ
λC(Nc) = [1.38126e-7, 1.11956e-7, 2.3071e-6, 6.23515e-8, 2.35806e-6, 6.39027e-8, 0.000190449, 2.95021e-7, 3.32824e-6, 2.98499e-5, 1.47877e-5, 1.72587e-7, 9.00342e-8, 0.00010077, 9.19472e-8, 2.80018e-5, 9.8548e-6, 4.60623e-6, 4.94286e-6]
λ_C := sum(λC(Nc)) = 0.000392282
1/λ_C = 2549.19
## Микросхемы
Nm := 11
Kкор := 3
DD_Table := READPRN("../Плата CAM/ExportMathcad/DCAM.txt")  # Получение таблицы из  exsel
Kэ := 5  # Коэффициент зависящий от эксплутации (Железная дорога, механические (машины)
Kп := 1  # Коэффициент зависящий от производства (Военная приемка)
# Колличество в схеме
#
# Время наработки до отказа
# Интенсивность отказа
#
# Рабочая температура
# Придельная температура
#
# Рабочее напряжение
# Придельное напряжение
# Колличество элементов
# Kv
DD_Table = [
    1, 1, 1, 1, 1, 1, 2, 3, 2, 1, 1;
    55555556, 35714286, 35714286, 35714286, 35714286, 35714286, 35714286, 35714286, 35714286, 35714286, 35714286;
    1.8e-8, 2.8e-8, 2.8e-8, 2.8e-8, 2.8e-8, 2.8e-8, 2.8e-8, 2.8e-8, 2.8e-8, 2.8e-8, 2.8e-8;
    35, 35, 35, 35, 35, 35, 35, 35, 35, 35, 35;
    85, 85, 85, 150, 125, 85, 85, 150, 150, 85, 120;
    0.9, 0.9, 0.9, 0.9, 0.9, 0.9, 0.9, 0.9, 0.9, 0.9, 0.9;
    1, 1, 1, 1, 1, 1, 1, 1, 1, 1, 1;
    10000, 10000, 10000, 1000, 100, 100, 100, 100, 100, 100, 1000;
    1, 1, 1, 10, 1, 1, 1, 1, 1, 1, 1
]
## Температурный коэффициент К_t
Kt(Nm) :=
    for i ∈ 0 .. Nm - 1
        if i ≤ 2
            B ← 0.021
            K[0, i] ← exp(B*(DD_Table[3, i] - 25))
            i ← i + 1
        B ← 0.023
        K[0, i] ← exp(B*(DD_Table[3, i] - 25))
    K
Kt(Nm) = [1.23368, 1.23368, 1.23368, 1.2586, 1.2586, 1.2586, 1.2586, 1.2586, 1.2586, 1.2586, 1.2586]
## Коэфициент нагрузки К_н
Kобл(Nm) :=
    for i ∈ 0 .. Nm - 1
        K[0, i] ← DD_Table[5, i]/DD_Table[6, i]
    K
Kобл(Nm) = [0.9, 0.9, 0.9, 0.9, 0.9, 0.9, 0.9, 0.9, 0.9, 0.9, 0.9]
## Коэффициент, зависящий от коэффициента нагрузки К_p
Kp(Nm) :=
    for i ∈ 0 .. Nm - 1
        if i ≤ 2
            B ← 0.021
            t[0, i] ← DD_Table[3, i] + 30
            K[0, i] ← 0.045*exp(3.1*Kобл(Nm)[0, i])*exp(B*(t[0, i] - 25))
            i ← i + 1
        B ← 0.023
        t[0, i] ← DD_Table[3, i] + 30
        K[0, i] ← 0.045*exp(3.1*Kобл(Nm)[0, i])*exp(B*(t[0, i] - 25))
    K
Kp(Nm) = [1.69708, 1.69708, 1.69708, 1.83842, 1.83842, 1.83842, 1.83842, 1.83842, 1.83842, 1.83842, 1.83842]
## Коэффициент, зависящий от количества элементов микросхемы К_ис
Kис(Nm) :=
    for i ∈ 0 .. Nm - 1
        if i == 0
            A ← 1.113
            S ← 0.128
            K[0, i] ← A*DD_Table[7, i]^S
            i ← i + 1
        if i ≤ 2
            A ← 0.336
            S ← 0.288
            K[0, i] ← A*DD_Table[7, i]^S
            i ← i + 1
        A ← 0.478
        S ← 0.253
        K[0, i] ← A*DD_Table[7, i]^S
    K
Kис(Nm) = [3.61822, 4.76803, 4.76803, 2.74428, 1.5326, 1.5326, 1.5326, 1.5326, 1.5326, 1.5326, 2.74428]
## Интесивность отказов для группы элемента, с учетом коэффициентов
λd(Nm) :=
    for i ∈ 0 .. Nm - 1
        λ[0, i] ← DD_Table[0, i]*DD_Table[2, i]*Kt(Nm)[0, i]*Kис(Nm)[0, i]*Kкор*DD_Table[8, i]*Kэ*Kп
    λ
λd(Nm) = [1.2052e-6, 2.47053e-6, 2.47053e-6, 1.45066e-5, 8.10149e-7, 8.10149e-7, 1.6203e-6, 2.43045e-6, 1.6203e-6, 8.10149e-7, 1.45066e-6]
λ_DD := sum(λd(Nm)) = 3.0205e-5
1/λ_DD = 33107.1
## Предохранители
FU_Table := READPRN("../Плата CAM/ExportMathcad/FUCAM.txt")  # Получение таблицы из  exsel
FU_Table = [3; 90909091; 1.1e-8; 35]
λ_FU := FU_Table[2, 0]*FU_Table[0, 0]*(0.061*FU_Table[3, 0] - 0.525)*Kэ*Kп = 2.6565e-7
1/λ_FU = 3764352
## Рeзисторы
N_R := 25
R_Table := READPRN("../Плата CAM/ExportMathcad/RCAM.txt")
R_Table = [
    9, 2, 1, 2, 5, 2, 2, 7, 3, 1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;
    29411765, 29411765, 29411765, 29411765, 29411765, 29411765, 29411765, 29411765, 29411765, 29411765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;
    3.4e-8, 3.4e-8, 3.4e-8, 3.4e-8, 3.4e-8, 3.4e-8, 3.4e-8, 3.4e-8, 3.4e-8, 3.4e-8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;
    0.25, 0.25, 0.25, 0.1, 0.125, 0.25, 0.1, 1, 0.1, 0.1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;
    0.0784, 0.036, 0.01, 0.036, 0.0504, 0.225, 0.0036, 0.015, 0.0036, 0.0036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;
    35, 35, 35, 35, 35, 35, 35, 35, 35, 35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;
    0.5, 0.5, 0.5, 0.5, 0.5, 0.5, 0.5, 0.5, 0.5, 0.5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]
## Коэффициент нагрузки К_н
R_KH(N_R) :=
    for i ∈ 0 .. N_R - 1
        K[0, i] ← R_Table[4, i]/R_Table[3, i]
    K
R_KH(N_R) = [0.3136, 0.144, 0.04, 0.36, 0.4032, 0.9, 0.036, 0.015, 0.036, 0.036, 0.036, 0.7, 0.72, 0.036, 1, 0.0144, 0.54, 0.576, 0.0036, 0.51, 0.1, 0.2016, 1, 1, 0.7]
R_KP(N_R) :=
    A ← 0.260
    B ← 0.5078
    Nt ← 343
    G ← 9.278
    Ns ← 0.878
    J ← 1
    H ← 0.886
    for i ∈ 0 .. N_R - 1
        K[0, i] ← A*exp(B*((R_Table[5, i] + 273)/Nt)^G)*exp(((R_KH(N_R)[0, i]/Ns)*((R_Table[5, i] + 273)/273)^J)^H)
    K
R_KP(N_R) = [0.490151, 0.392302, 0.336921, 0.519485, 0.547951, 0.977716, 0.334763, 0.323108, 0.334763, 0.334763, 0.334763, 0.779118, 0.797252, 0.334763, 1.09282, 0.322761, 0.646231, 0.674335, 0.316174, 0.623553, 0.368748, 0.424082, 1.09282, 1.09282, 0.779118]
λR(N_R) :=
    for i ∈ 0 .. N_R - 1
        λ[0, i] ← R_Table[2, i]*R_Table[0, i]*R_KP(N_R)[0, i]*R_Table[6, i]*Kэ*Kп
    λ
λ_R := sum(λR(N_R)) = 6.08436e-6
1/λ_R = 164356
λR(N_R) = [3.74965e-7, 6.66914e-8, 2.86383e-8, 8.83124e-8, 2.32879e-7, 1.66212e-7, 5.69097e-8, 1.92249e-7, 8.53645e-8, 2.84548e-8, 2.84548e-8, 4.63575e-7, 8.80964e-7, 1.13819e-7, 1.7649e-6, 1.92043e-7, 5.49296e-8, 1.14637e-7, 1.45124e-7, 2.12008e-7, 3.13436e-8, 7.2094e-8, 3.71558e-7, 1.85779e-7, 1.3245e-7]
## Оптоэлектронная микросхема
U_Table := READPRN("../Плата CAM/ExportMathcad/UCAM.txt")
U_Table = [6; 35714286; 2.8e-8; 100]
λ_U := U_Table[2, 0]*U_Table[0, 0]*Kэ*Kп = 8.4e-7
1/λ_U = 1190476
## Диоды
N_VD := 10
VD_Table := READPRN("../Плата CAM/ExportMathcad/VDCAM.txt")
VD_Table = [
    5, 5, 2, 4, 4, 1, 1, 2, 1, 1;
    243902439, 243902439, 243902439, 243902439, 243902439, 243902439, 40000000, 10989011, 5405405, 5405405;
    4.1e-9, 4.1e-9, 4.1e-9, 4.1e-9, 4.1e-9, 4.1e-9, 2.5e-8, 9.1e-8, 1.85e-7, 1.85e-7;
    0.005, 0.001, 169, 33.3333, 80, 75, 0.45, 5, 0.02, 0.02;
    0.001, 0.00033, 50, 14, 2, 30, 0.01, 1.5, 0.014, 0.014;
    1, 1, 1.5, 1, 1, 1, 1, 1.5, 1, 1;
    1, 1, 1, 2, 2, 1, 0.6, 1, 0.6, 0.6;
    35, 35, 35, 35, 35, 35, 35, 35, 35, 35
]
VD_KH(N_VD) :=
    for i ∈ 0 .. N_VD - 1
        K[0, i] ← VD_Table[4, i]/VD_Table[3, i]
    K
VD_KH(N_VD) = [0.2, 0.33, 0.295858, 0.42, 0.025, 0.4, 0.0222222, 0.3, 0.7, 0.7]
VD_KP(N_VD) :=
    for i ∈ 0 .. N_VD - 1
        if i < 2
            A ← 2.1935
            Nt ← -800
            Tm ← 448
            L ← 14.0
            Δt ← 150
            K[0, i] ← A*exp(Nt/(273 + VD_Table[7, i] + Δt*VD_KH(N_VD)[0, i]) + ((273 + VD_Table[7, i] + Δt*VD_KH(N_VD)[0, i])/Tm)^L)
            i ← i + 1
        if i ≤ 7
            A ← 44.1025
            Nt ← -2138
            Tm ← 448
            L ← 17.7
            Δt ← 150
            K[0, i] ← A*exp(Nt/(273 + VD_Table[7, i] + Δt*VD_KH(N_VD)[0, i]) + ((273 + VD_Table[7, i] + Δt*VD_KH(N_VD)[0, i])/Tm)^L)
            i ← i + 1
        Ea ← 0.6
        k ← 8.625*10^-5
        m ← 1.5
        tp ← VD_Table[7, i] + VD_KH(N_VD)[0, i]*20
        tp0 ← 45
        K[0, i] ← VD_KH(N_VD)[0, i]^m*exp(Ea/k*(1/(tp0 + 273) - 1/(tp + 273)))
    K
VD_KP(N_VD) = [0.209715, 0.244191, 0.103669, 0.143592, 0.0464253, 0.136352, 0.0459994, 0.10483, 0.76854, 0.76854]
VD_KU(N_VD) :=
    for i ∈ 0 .. N_VD - 1
        K[0, i] ← 1/(2.11 - 1.11*VD_KH(N_VD)[0, i]) if VD_KH(N_VD)[0, i] > 0.6
        K[0, i] ← 0.7
    K
VD_KU(N_VD) = [0.7, 0.7, 0.7, 0.7, 0.7, 0.7, 0.7, 0.7, 0.7, 0.7]
λVD(N_VD) :=
    for i ∈ 0 .. N_VD - 1
        if i ≤ 1
            λ[0, i] ← VD_Table[0, i]*VD_Table[2, i]*VD_KP(N_VD)[0, i]*Kэ*Kп
            i ← i + 1
        if i ≤ 7
            λ[0, i] ← VD_Table[0, i]*VD_Table[2, i]*VD_KP(N_VD)[0, i]*VD_Table[5, i]*VD_Table[6, i]*Kэ*Kп
            i ← i + 1
        λ[0, i] ← VD_Table[0, i]*VD_Table[2, i]*VD_KP(N_VD)[0, i]*Kэ*Kп
    λ
λVD(N_VD) = [2.14958e-8, 2.50296e-8, 6.37566e-9, 2.3549e-8, 7.61375e-9, 2.79522e-9, 3.44995e-9, 1.43093e-7, 7.10899e-7, 7.10899e-7]
λ_VD := sum(λVD(N_VD)) = 1.6552e-6
1/λ_VD = 604156
## Транзисторы
N_VT := 3
VT_Table := READPRN("../Плата CAM/ExportMathcad/VTCAM.txt")
VT_Table = [
    4, 1, 2;
    409500410, 409500410, 409500410;
    2.442e-9, 2.442e-9, 2.442e-9;
    13.6, 300, 350;
    0.1, 10, 10;
    0.7, 0.7, 0.7;
    35, 35, 35
]
VT_KH(N_VT) :=
    for i ∈ 0 .. N_VT - 1
        K[0, i] ← VT_Table[4, i]/VT_Table[3, i]
    K
VT_KH(N_VT) = [0.00735294, 0.0333333, 0.0285714]
VT_KP(N_VT) :=
    A ← 5.2
    Nt ← -1162
    Tm ← 448
    L ← 13.8
    Δt ← 150
    for i ∈ 0 .. N_VT - 1
        K[0, i] ← A*exp(Nt/(273 + VT_Table[6, i] + Δt*VT_KH(N_VT)[0, i]) + ((273 + VT_Table[6, i] + Δt*VT_KH(N_VT)[0, i])/Tm)^L)
    K
VT_KP(N_VT) = [0.12189, 0.127874, 0.126765]
λVT(N_VT) :=
    for i ∈ 0 .. N_VT - 1
        λ[0, i] ← VT_Table[2, i]*VT_Table[0, i]*VT_KP(N_VT)[0, i]*VT_Table[5, i]*Kэ*Kп
    λ
λVT(N_VT) = [4.16716e-9, 1.09294e-9, 2.16692e-9]
λ_VT := sum(λVT(N_VT)) = 7.42703e-9
1/λ_VT = 134643379
## Разъемы
t_p := 30
N_X := 7
X_Table := READPRN("../Плата CAM/ExportMathcad/XCAM.txt")
X_Table = [
    3, 6, 1, 4, 5, 1, 2;
    96153846, 96153846, 96153846, 96153846, 96153846, 96153846, 96153846;
    1.04e-8, 1.04e-8, 1.04e-8, 1.04e-8, 1.04e-8, 1.04e-8, 1.04e-8;
    1.5, 1.5, 1.5, 15, 1.5, 0.008, 2;
    1, 1, 1, 1, 1, 0.001, 1;
    6, 18, 10, 8, 8, 8, 12;
    50, 50, 50, 50, 50, 50, 50;
    1000, 1000, 1000, 1000, 1000, 1000, 1000
]
K_H(N_X) :=
    for i ∈ 0 .. N_X - 1
        K[0, i] ← X_Table[4, i]/X_Table[3, i]
    K
K_H(N_X) = [0.666667, 0.666667, 0.666667, 0.0666667, 0.666667, 0.125, 0.5]
K_P :=
    for i ∈ 0 .. N_X - 1
        K[0, i] ← exp(9000*(1/(298 + t_p) - 1/(273 + X_Table[6, i] + t_p*exp(-1.8*(1 - K_H(N_X)[0, i])))))
    K
K_P = [2.52608, 2.52608, 2.52608, 1.05061, 2.52608, 1.10613, 1.80245]
K_K :=
    for i ∈ 0 .. N_X - 1
        K[0, i] ← exp((0.1*(X_Table[5, i] - 1))^0.51064)
    K
K_K = [2.0176, 3.71071, 2.57956, 2.30134, 2.30134, 2.30134, 2.85729]
K_n :=
    for i ∈ 0 .. N_X - 1
        K[0, i] ← 0.32*exp(0.0028*X_Table[7, i])
    K
K_n = [5.26229, 5.26229, 5.26229, 5.26229, 5.26229, 5.26229, 5.26229]
λx :=
    for i ∈ 0 .. N_X - 1
        K[0, i] ← X_Table[0, i]*X_Table[2, i]*K_P[0, i]*K_K[0, i]*K_n[0, i]*Kэ*Kп
    K
λx = [4.1839e-6, 1.53898e-5, 1.78308e-6, 2.64642e-6, 7.9538e-6, 6.96571e-7, 2.81855e-6]
λ_X := sum(λx) = 3.54721e-5
1/λ_X = 28191.2
## Плата
PL_Table := READPRN("../Плата CAM/ExportMathcad/Plata.txt")
PL_Table = [1.7e-11; 4; 480; 0; 35]
λ_PL := PL_Table[0, 0]*(PL_Table[2, 0]*PL_Table[1, 0] + PL_Table[3, 0]*(PL_Table[1, 0] + 13))*(0.061*PL_Table[4, 0] - 0.525)*Kэ*Kп = 2.62752e-7
λ_VT = 7.42703e-9
λ_X = 3.54721e-5
λ_VD = 1.6552e-6
λ_R = 6.08436e-6
λ_U = 8.4e-7
λ_C = 0.000392282
λ_DD = 3.0205e-5
λ_FU = 2.6565e-7
λ_PL = 2.62752e-7
λ := λ_C + λ_DD + λ_FU + λ_R + λ_U + λ_VD + λ_VT + λ_X + λ_PL = 0.000467074
1/λ = 2140.99
