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# Плата CTRL
# Конденсаторы
KЭ := 5  # Коэффициент зависящий от эксплутации (Железная дорога, механические (машины)
KП := 1  # Коэффициент зависящий от производства (Военная приемка)
Ea := 0.35  # Энергий активации
Nc := 19
C_Table := READPRN("../Плата CTRL/ExportMathcad/CCtrl.txt")  # Получение таблицы из  exsel
C_Table = [
    1, 2, 8, 1, 2, 1, 5, 3, 1, 4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;
    17424168455, 3098504, 3098504, 3098504, 525913, 3098504, 25090, 3098504, 30000, 525913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;
    1.73e-7, 3.23e-7, 3.23e-7, 3.23e-7, 2e-9, 3.23e-7, 3.986e-5, 3.23e-7, 3.3333e-5, 2e-9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;
    0.00047, 1e-9, 1e-6, 2.2e-9, 2.2e-6, 2.7e-9, 4.7e-6, 1e-8, 1e-11, 1e-5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;
    50, 50, 100, 50, 16, 50, 100, 50, 100, 10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;
    30, 1.2, 30, 3.6, 3.6, 3.6, 30, 15, 3.6, 3.6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;
    35, 35, 35, 35, 35, 35, 35, 35, 35, 35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]
# Коэффициент нагрузки конденсатора
KH(Nc) :=
    for i ∈ 0 .. Nc - 1
        K[0, i] ← C_Table[5, i]/C_Table[4, i]
    K
KH(Nc) = [0.6, 0.024, 0.3, 0.072, 0.225, 0.072, 0.3, 0.3, 0.036, 0.36, 0.036, 0.062, 0.072, 0.31875, 0.072, 0.6, 0.15, 0.036, 0.036]
# Коэффициент режима работы, зависящей от электрической нагрузки
KP(Nc) :=
    for i ∈ 0 .. Nc - 1
        if i == 0
            A ← 3.59*10^-2
            B ← 4.09
            Nt ← 358
            G ← 5.9
            Ns ← 0.55
            H ← 3
            K[0, i] ← A*((KH(Nc)[0, i]/Ns)^H + 1)*exp(B*((C_Table[6, i] + 273)/Nt)^G)
            i ← i + 1
        A ← 5.909*10^-7
        B ← 14.3
        Nt ← 398
        G ← 1
        Ns ← 0.3
        H ← 3
        K[0, i] ← A*((KH(Nc)[0, i]/Ns)^H + 1)*exp(B*((C_Table[6, i] + 273)/Nt)^G)
    K
KP(Nc) = [0.444339, 0.0378254, 0.075612, 0.0383286, 0.0537554, 0.0383286, 0.075612, 0.075612, 0.0378713, 0.103135, 0.0378713, 0.0381397, 0.0383286, 0.0831529, 0.0383286, 0.340254, 0.0425318, 0.0378713, 0.0378713]
# Температурный коэффициент
KT(Nc) :=
    for i ∈ 0 .. Nc - 1
        K[0, i] ← 1/exp(-Ea/(8.617*10^5)*(1/(C_Table[6, i] + 273) - 1/298))
    K
KT(Nc) = [1, 1, 1, 1, 1, 1, 1, 1, 1, 1, 1, 1, 1, 1, 1, 1, 1, 1, 1]
# Расчет коэффициента зависящего от номинальной емкости
KC(Nc) :=
    for i ∈ 0 .. Nc - 1
        if i == 0
            x ← C_Table[3, i]*10^6
            K[0, i] ← 0.2*x^0.23
            i ← i + 1
        x ← C_Table[3, i]*10^12
        K[0, i] ← 0.4*x^0.12
    K
KC(Nc) = [0.823403, 0.916347, 2.09923, 1.00728, 2.30755, 1.03234, 2.52762, 1.20798, 0.527303, 2.76732, 0.573038, 1.39406, 1.45449, 3.33205, 1.4854, 1.59243, 0.69512, 0.729778, 0.783112]
# Интесивность отказов для одного элемента, с учетом коэффициентов
λC(Nc) :=
    for i ∈ 0 .. Nc - 1
        λ[0, i] ← C_Table[0, i]*C_Table[2, i]*KP(Nc)[0, i]*KC(Nc)[0, i]*KЭ*KП
    λ
λC(Nc) = [3.16477e-7, 1.11956e-7, 2.05075e-6, 6.23515e-8, 2.48086e-9, 6.39027e-8, 0.000190449, 4.42532e-7, 3.32824e-6, 1.14163e-8, 1.44677e-5, 1.71736e-7, 9.00342e-8, 1.66242e-8, 9.19472e-8, 4.11276e-5, 1.47822e-5, 4.60623e-6, 4.94286e-6]
λ_C := sum(λC(Nc)) = 0.000277137
1/λ_C = 3608.33
## Микросхемы
Nm := 10
Kкор := 3
DD_Table := READPRN("../Плата CTRL/ExportMathcad/DCtrl.txt")  # Получение таблицы из  exsel
Kэ := 5  # Коэффициент зависящий от эксплутации (Железная дорога, механические (машины)
Kп := 1  # Коэффициент зависящий от производства (Военная приемка)
# Колличество в схеме
#
# Время наработки до отказа
# Интенсивность отказа
#
# Рабочая температура
# Придельная температура
#
# Рабочее напряжение
# Придельное напряжение
# Колличество элементов
# Kv
DD_Table = [
    1, 1, 1, 2, 1, 2, 2, 2, 1, 1;
    55555556, 35714286, 35714286, 35714286, 35714286, 35714286, 35714286, 35714286, 35714286, 35714286;
    1.8e-8, 2.8e-8, 2.8e-8, 2.8e-8, 2.8e-8, 2.8e-8, 2.8e-8, 2.8e-8, 2.8e-8, 2.8e-8;
    35, 35, 35, 35, 35, 35, 35, 35, 35, 35;
    85, 85, 85, 150, 125, 85, 150, 150, 85, 120;
    8, 100, 25, 16, 5, 16, 5, 16, 4, 6;
    8, 128, 32, 24, 5, 24, 5, 24, 4, 6;
    10000, 10000, 10000, 100, 100, 100, 100, 100, 100, 1000;
    1, 1, 1, 1, 1, 1, 1, 1, 1, 1
]
## Температурный коэффициент К_t
Kt(Nm) :=
    for i ∈ 0 .. Nm - 1
        if i ≤ 3
            B ← 0.021
            K[0, i] ← exp(B*(DD_Table[3, i] - 25))
            i ← i + 1
        B ← 0.023
        K[0, i] ← exp(B*(DD_Table[3, i] - 25))
    K
Kt(Nm) = [1.23368, 1.23368, 1.23368, 1.23368, 1.2586, 1.2586, 1.2586, 1.2586, 1.2586, 1.2586]
## Коэфициент нагрузки К_н
Kобл(Nm) :=
    for i ∈ 0 .. Nm - 1
        K[0, i] ← DD_Table[5, i]/DD_Table[6, i]
    K
Kобл(Nm) = [1, 0.78125, 0.78125, 0.666667, 1, 0.666667, 1, 0.666667, 1, 1]
## Коэффициент, зависящий от коэффициента нагрузки К_p
Kp(Nm) :=
    for i ∈ 0 .. Nm - 1
        if i ≤ 3
            B ← 0.021
            t[0, i] ← DD_Table[3, i] + 30
            K[0, i] ← 0.045*exp(3.1*Kобл(Nm)[0, i])*exp(B*(t[0, i] - 25))
            i ← i + 1
        B ← 0.023
        t[0, i] ← DD_Table[3, i] + 30
        K[0, i] ← 0.045*exp(3.1*Kобл(Nm)[0, i])*exp(B*(t[0, i] - 25))
    K
Kp(Nm) = [2.31384, 1.17443, 1.17443, 0.823307, 2.50655, 0.891878, 2.50655, 0.891878, 2.50655, 2.50655]
## Коэффициент, зависящий от количества элементов микросхемы К_ис
Kис(Nm) :=
    for i ∈ 0 .. Nm - 1
        if i == 0
            A ← 1.113
            S ← 0.128
            K[0, i] ← A*DD_Table[7, i]^S
            i ← i + 1
        if i ≤ 3
            A ← 0.336
            S ← 0.288
            K[0, i] ← A*DD_Table[7, i]^S
            i ← i + 1
        A ← 0.478
        S ← 0.253
        K[0, i] ← A*DD_Table[7, i]^S
    K
Kис(Nm) = [3.61822, 4.76803, 4.76803, 1.26572, 1.5326, 1.5326, 1.5326, 1.5326, 1.5326, 2.74428]
## Интесивность отказов для группы элемента, с учетом коэффициентов
λd(Nm) :=
    for i ∈ 0 .. Nm - 1
        λ[0, i] ← DD_Table[0, i]*DD_Table[2, i]*Kt(Nm)[0, i]*Kис(Nm)[0, i]*Kкор*DD_Table[8, i]*Kэ*Kп
    λ
λd(Nm) = [1.2052e-6, 2.47053e-6, 2.47053e-6, 1.31166e-6, 8.10149e-7, 1.6203e-6, 1.6203e-6, 1.6203e-6, 8.10149e-7, 1.45066e-6]
λ_DD := sum(λd(Nm)) = 1.53898e-5
1/λ_DD = 64978.2
## Предохранители
FU_Table := READPRN("../Плата CTRL/ExportMathcad/FUCtrl.txt")  # Получение таблицы из  exsel
FU_Table = [2; 90909091; 1.1e-8; 35]
λ_FU := FU_Table[2, 0]*FU_Table[0, 0]*(0.061*FU_Table[3, 0] - 0.525)*Kэ*Kп = 1.771e-7
## Катушка индкутивности
# Получение таблицы из  exsel
L_Table := READPRN("../Плата CTRL/ExportMathcad/LCtrl.txt ")  # Получение таблицы из  exsel
L_Table = [
    1, 1, 3;
    100000000, 100000000, 100000000;
    1e-8, 1e-8, 1e-8;
    1.5, 0.0056, 0.0015;
    9, 4.5, 0.8;
    35, 35, 35
]
## Коэффициент нагрузки К_н
L_KH :=
    for i ∈ 0 .. 2
        K[0, i] ← L_Table[3, i]/L_Table[4, i]
    K
L_KH = [0.166667, 0.00124444, 0.001875]
## Коэффициент зависящий от коэффициента нагрузки К_р
L_KP :=
    for i ∈ 0 .. 2
        K[0, i] ← 0.46 + 0.012*((-L_Table)[5, i] + 50)^1.3 + 0.54*L_KH[0, i]*exp(0.2*(-L_Table[5, i] + 50)^0.8)
    K
L_KP = [1.38116, 0.869451, 0.871402]
λL :=
    for i ∈ 0 .. 2
        λ[0, i] ← L_Table[2, i]*L_Table[0, i]*L_KP[0, i]*Kэ*Kп
    λ
λL = [6.90578e-8, 4.34726e-8, 1.3071e-7]
λ_L := sum(λL) = 2.43241e-7
1/λ_L = 4111155
## Рeзисторы
N_R := 24
R_Table := READPRN("../Плата CTRL/ExportMathcad/RCtrl.txt")
R_Table = [
    8, 2, 2, 2, 4, 2, 2, 6, 3, 1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;
    29411765, 29411765, 29411765, 29411765, 29411765, 29411765, 29411765, 29411765, 29411765, 29411765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;
    3.4e-8, 3.4e-8, 3.4e-8, 3.4e-8, 3.4e-8, 3.4e-8, 3.4e-8, 3.4e-8, 3.4e-8, 3.4e-8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;
    0.25, 0.25, 0.25, 0.1, 0.125, 0.25, 0.1, 1, 0.1, 0.1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;
    0.0784, 0.036, 0.028, 0.036, 0.054, 0.225, 0.0036, 0.015, 0.0036, 0.0036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;
    35, 35, 35, 35, 35, 35, 35, 35, 35, 35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;
    0.5, 0.5, 0.5, 0.5, 0.5, 0.5, 0.5, 0.5, 0.5, 0.5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]
## Коэффициент нагрузки К_н
R_KH(N_R) :=
    for i ∈ 0 .. N_R - 1
        K[0, i] ← R_Table[4, i]/R_Table[3, i]
    K
R_KH(N_R) = [0.3136, 0.144, 0.112, 0.36, 0.432, 0.9, 0.036, 0.015, 0.036, 0.036, 0.036, 0.54, 0.72, 1, 0.54, 0.1682, 0.54, 0.432, 0.36, 0.51, 0.1, 0.504, 0.504, 0.504]
R_KP(N_R) :=
    A ← 0.260
    B ← 0.5078
    Nt ← 343
    G ← 9.278
    Ns ← 0.878
    J ← 1
    H ← 0.886
    for i ∈ 0 .. N_R - 1
        K[0, i] ← A*exp(B*((R_Table[5, i] + 273)/Nt)^G)*exp(((R_KH(N_R)[0, i]/Ns)*((R_Table[5, i] + 273)/273)^J)^H)
    K
R_KP(N_R) = [0.490151, 0.392302, 0.375126, 0.519485, 0.567583, 0.977716, 0.334763, 0.323108, 0.334763, 0.334763, 0.334763, 0.646231, 0.797252, 1.09282, 0.646231, 0.405502, 0.646231, 0.567583, 0.519485, 0.623553, 0.368748, 0.619096, 0.619096, 0.619096]
λR(N_R) :=
    for i ∈ 0 .. N_R - 1
        λ[0, i] ← R_Table[2, i]*R_Table[0, i]*R_KP(N_R)[0, i]*R_Table[6, i]*Kэ*Kп
    λ
λ_R := sum(λR(N_R)) = 6.66986e-6
1/λ_R = 149928
λR(N_R) = [3.33303e-7, 6.66914e-8, 6.37714e-8, 8.83124e-8, 1.92978e-7, 1.66212e-7, 5.69097e-8, 1.64785e-7, 8.53645e-8, 2.84548e-8, 2.84548e-8, 1.09859e-7, 2.57513e-6, 3.71558e-7, 6.04226e-7, 2.06806e-7, 5.49296e-8, 9.64891e-8, 2.38443e-7, 1.06004e-7, 3.13436e-8, 5.78855e-7, 2.10493e-7, 2.10493e-7]
## Оптоэлектронная микросхема
U_Table := READPRN("../Плата CTRL/ExportMathcad/UCtrl.txt")
U_Table = [3; 35714286; 2.8e-8; 35]
λ_U := U_Table[2, 0]*U_Table[0, 0]*Kэ*Kп = 4.2e-7
1/λ_U = 2380952
## Диоды
N_VD := 9
VD_Table := READPRN("../Плата CTRL/ExportMathcad/VDCtrl.txt")
VD_Table = [
    4, 3, 1, 1, 2, 1, 13, 1, 1;
    243902439, 243902439, 243902439, 243902439, 10989011, 40000000, 10989011, 5405405, 5405405;
    4.1e-9, 4.1e-9, 4.1e-9, 4.1e-9, 9.1e-8, 2.5e-8, 9.1e-8, 1.85e-7, 1.85e-7;
    0.005, 0.152, 169, 75, 5, 0.45, 56.6038, 0.02, 0.02;
    0.00145, 0.01, 33, 30, 1.5, 0.001, 14, 0.014, 0.014;
    1, 1, 1.5, 1, 1.5, 1, 1, 1, 1;
    1, 1, 1, 1, 1, 0.6, 2, 0.6, 0.6;
    35, 35, 35, 35, 35, 35, 35, 35, 35
]
VD_KH(N_VD) :=
    for i ∈ 0 .. N_VD - 1
        K[0, i] ← VD_Table[4, i]/VD_Table[3, i]
    K
VD_KH(N_VD) = [0.29, 0.0657895, 0.195266, 0.4, 0.3, 0.00222222, 0.247333, 0.7, 0.7]
VD_KP(N_VD) :=
    for i ∈ 0 .. N_VD - 1
        if i < 2
            A ← 2.1935
            Nt ← -800
            Tm ← 448
            L ← 14.0
            Δt ← 150
            K[0, i] ← A*exp(Nt/(273 + VD_Table[7, i] + Δt*VD_KH(N_VD)[0, i]) + ((273 + VD_Table[7, i] + Δt*VD_KH(N_VD)[0, i])/Tm)^L)
            i ← i + 1
        if i ≤ 6
            A ← 44.1025
            Nt ← -2138
            Tm ← 448
            L ← 17.7
            Δt ← 150
            K[0, i] ← A*exp(Nt/(273 + VD_Table[7, i] + Δt*VD_KH(N_VD)[0, i]) + ((273 + VD_Table[7, i] + Δt*VD_KH(N_VD)[0, i])/Tm)^L)
            i ← i + 1
        Ea ← 0.6
        k ← 8.625*10^-5
        m ← 1.5
        tp ← VD_Table[7, i] + VD_KH(N_VD)[0, i]*20
        tp0 ← 45
        K[0, i] ← VD_KH(N_VD)[0, i]^m*exp(Ea/k*(1/(tp0 + 273) - 1/(tp + 273)))
    K
VD_KP(N_VD) = [0.232943, 0.178517, 0.0784208, 0.136352, 0.10483, 0.0430155, 0.0908154, 0.76854, 0.76854]
VD_KU(N_VD) :=
    for i ∈ 0 .. N_VD - 1
        K[0, i] ← 1/(2.11 - 1.11*VD_KH(N_VD)[0, i]) if VD_KH(N_VD)[0, i] > 0.6
        K[0, i] ← 0.7
    K
VD_KU(N_VD) = [0.7, 0.7, 0.7, 0.7, 0.7, 0.7, 0.7, 0.7, 0.7]
λVD(N_VD) :=
    for i ∈ 0 .. N_VD - 1
        if i ≤ 1
            λ[0, i] ← VD_Table[0, i]*VD_Table[2, i]*VD_KP(N_VD)[0, i]*Kэ*Kп
            i ← i + 1
        if i ≤ 6
            λ[0, i] ← VD_Table[0, i]*VD_Table[2, i]*VD_KP(N_VD)[0, i]*VD_Table[5, i]*VD_Table[6, i]*Kэ*Kп
            i ← i + 1
        λ[0, i] ← VD_Table[0, i]*VD_Table[2, i]*VD_KP(N_VD)[0, i]*Kэ*Kп
    λ
λVD(N_VD) = [1.91013e-8, 1.09788e-8, 2.41144e-9, 2.79522e-9, 1.43093e-7, 3.22616e-9, 1.07435e-6, 7.10899e-7, 7.10899e-7]
λ_VD := sum(λVD(N_VD)) = 2.67775e-6
1/λ_VD = 373448
## Транзисторы
N_VT := 3
VT_Table := READPRN("../Плата CTRL/ExportMathcad/VTCtrl.txt")
VT_Table = [
    3, 1, 5;
    409500410, 409500410, 409500410;
    2.442e-9, 2.442e-9, 2.442e-9;
    13.6, 300, 350;
    10, 15, 30;
    0.7, 0.7, 0.7;
    35, 35, 35
]
VT_KH(N_VT) :=
    for i ∈ 0 .. N_VT - 1
        K[0, i] ← VT_Table[4, i]/VT_Table[3, i]
    K
VT_KH(N_VT) = [0.735294, 0.05, 0.0857143]
VT_KP(N_VT) :=
    A ← 5.2
    Nt ← -1162
    Tm ← 448
    L ← 13.8
    Δt ← 150
    for i ∈ 0 .. N_VT - 1
        K[0, i] ← A*exp(Nt/(273 + VT_Table[6, i] + Δt*VT_KH(N_VT)[0, i]) + ((273 + VT_Table[6, i] + Δt*VT_KH(N_VT)[0, i])/Tm)^L)
    K
VT_KP(N_VT) = [0.47649, 0.1318, 0.14045]
λVT(N_VT) :=
    for i ∈ 0 .. N_VT - 1
        λ[0, i] ← VT_Table[2, i]*VT_Table[0, i]*VT_KP(N_VT)[0, i]*VT_Table[5, i]*Kэ*Kп
    λ
λVT(N_VT) = [1.22177e-8, 1.1265e-9, 6.00213e-9]
λ_VT := sum(λVT(N_VT)) = 1.93463e-8
1/λ_VT = 51689452
## Резонатор
N_Z := 2
Z_Table := READPRN("../Плата CTRL/ExportMathcad/ZCtrl.txt")
Z_Table = [1, 1; 38461538, 38461538; 2.6e-8, 2.6e-8; 50, 50]
Kt_t :=
    for i ∈ 0 .. N_Z - 1
        K[0, i] ← exp(0.017*Z_Table[3, i])
    K
Kt_t = [2.33965, 2.33965]
λZ :=
    for i ∈ 0 .. N_Z - 1
        K[0, i] ← Z_Table[0, i]*Z_Table[2, i]*Kt_t[0, i]*Kэ*Kп
    K
λZ = [3.04154e-7, 3.04154e-7]
λ_Z := sum(λZ) = 6.08308e-7
## Разъемы
t_p := 30
N_X := 8
X_Table := READPRN("../Плата CTRL/ExportMathcad/XCtrl.txt")
X_Table = [
    2, 1, 1, 3, 1, 3, 1, 1;
    96153846, 96153846, 96153846, 96153846, 96153846, 96153846, 96153846, 96153846;
    1.04e-8, 1.04e-8, 1.04e-8, 1.04e-8, 1.04e-8, 1.04e-8, 1.04e-8, 1.04e-8;
    1.5, 1.5, 1.5, 15, 0.008, 2, 15, 15;
    1, 1, 1, 1, 0.001, 1, 1, 1;
    6, 18, 10, 8, 8, 12, 24, 20;
    50, 50, 50, 50, 50, 50, 50, 50;
    1000, 1000, 1000, 1000, 1000, 1000, 1000, 1000
]
K_H(N_X) :=
    for i ∈ 0 .. N_X - 1
        K[0, i] ← X_Table[4, i]/X_Table[3, i]
    K
K_H(N_X) = [0.666667, 0.666667, 0.666667, 0.0666667, 0.125, 0.5, 0.0666667, 0.0666667]
K_P :=
    for i ∈ 0 .. N_X - 1
        K[0, i] ← exp(9000*(1/(298 + t_p) - 1/(273 + X_Table[6, i] + t_p*exp(-1.8*(1 - K_H(N_X)[0, i])))))
    K
K_P = [2.52608, 2.52608, 2.52608, 1.05061, 1.10613, 1.80245, 1.05061, 1.05061]
K_K :=
    for i ∈ 0 .. N_X - 1
        K[0, i] ← exp((0.1*(X_Table[5, i] - 1))^0.51064)
    K
K_K = [2.0176, 3.71071, 2.57956, 2.30134, 2.30134, 2.85729, 4.61852, 4.00623]
K_n :=
    for i ∈ 0 .. N_X - 1
        K[0, i] ← 0.32*exp(0.0028*X_Table[7, i])
    K
K_n = [5.26229, 5.26229, 5.26229, 5.26229, 5.26229, 5.26229, 5.26229, 5.26229]
λx :=
    for i ∈ 0 .. N_X - 1
        K[0, i] ← X_Table[0, i]*X_Table[2, i]*K_P[0, i]*K_K[0, i]*K_n[0, i]*Kэ*Kп
    K
λx = [2.78927e-6, 2.56496e-6, 1.78308e-6, 1.98482e-6, 6.96571e-7, 4.22783e-6, 1.32777e-6, 1.15174e-6]
transpose(λx) = [2.78927e-6; 2.56496e-6; 1.78308e-6; 1.98482e-6; 6.96571e-7; 4.22783e-6; 1.32777e-6; 1.15174e-6]
λ_X := sum(λx) = 1.6526e-5
1/λ_X = 60510.6
PL_Table := READPRN("../Плата CTRL/ExportMathcad/Plata.txt")
PL_Table = [1.7e-11; 4; 638; 0; 35]
λ_PL := PL_Table[0, 0]*(PL_Table[2, 0]*PL_Table[1, 0] + PL_Table[3, 0]*(PL_Table[1, 0] + 13))*(0.061*PL_Table[4, 0] - 0.525)*Kэ*Kп = 3.49241e-7
λ_VT = 1.93463e-8
λ_X = 1.6526e-5
λ_VD = 2.67775e-6
λ_R = 6.66986e-6
λ_U = 4.2e-7
λ_PL = 3.49241e-7
λ_C = 0.000277137
λ_DD = 1.53898e-5
λ_Z = 6.08308e-7
λ := λ_C + λ_DD + λ_R + λ_U + λ_VD + λ_VT + λ_X + λ_FU + λ_L + λ_Z + λ_PL = 0.000320217
1/λ = 3122.88
P(t) := e^(-t*λ)
P(365) = 0.889693
P(1819) = 0.558514
P(6000) = 0.146416
