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Kэ := 5
Kп := 1
## Разъемы
t_p := 30
X_Table := READPRN("..\\Плата MAIN-CONNECT\XMAINConnect.txt")
X_Table = [3; 96153846; 1.04e-8; 2; 1; 132; 35; 1000]
K_H := X_Table[4, 0]/X_Table[3, 0] = 0.5
K_P := exp(9000*(1/(298 + t_p) - 1/(273 + X_Table[6, 0] + t_p*exp(-1.8*(1 - K_H))))) = 0.512393
K_K := exp((0.1*(X_Table[5, 0] - 1))^0.51064) = 41.2575
K_n := 0.32*exp(0.0028*X_Table[7, 0]) = 5.26229
λ_X := X_Table[0, 0]*X_Table[2, 0]*K_P*K_K*K_n*Kэ*Kп = 1.73542e-5
## Плата
PL_Table := READPRN("..\\Плата MAIN-CONNECT\Plata.txt")
PL_Table = [1.7e-11; 2; 170; 0; 35]
λ_PL := PL_Table[0, 0]*(PL_Table[2, 0]*PL_Table[1, 0] + PL_Table[3, 0]*(PL_Table[1, 0] + 13))*(0.061*PL_Table[4, 0] - 0.525)*Kэ*Kп = 4.6529e-8
λ_X = 1.73542e-5
λ_PL = 4.6529e-8
λ := λ_X + λ_PL = 1.74007e-5
1/λ = 57468.8
