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# Плата MainCpu
# Конденсаторы
KЭ := 5  # Коэффициент зависящий от эксплутации (Железная дорога, механические (машины)
KП := 1  # Коэффициент зависящий от производства (Военная приемка)
Ea := 0.35  # Энергий активации
Nc := 9
C_Table := READPRN("../Плата Main-CPU/ExportMathcad/CMainCpu.txt")  # Получение таблицы из  exsel
C_Table = [
    9, 37, 5, 6, 1, 2, 2, 1, 2;
    525913, 3098504, 525913, 30000, 30000, 3098504, 3098504, 30000, 525913;
    1.901e-6, 3.23e-7, 1.901e-6, 3.3333e-5, 3.3333e-5, 3.23e-7, 3.23e-7, 3.3333e-5, 1.901e-6;
    4.7e-5, 1e-7, 1e-5, 2.4e-11, 1e-11, 1e-9, 1e-8, 1e-10, 2.2e-6;
    17, 50, 10, 100, 100, 50, 50, 100, 16;
    10, 10, 5.6, 3.6, 3.6, 1.2, 5, 3.3, 3.6;
    35, 35, 35, 35, 35, 35, 35, 35, 35
]
# Коэффициент нагрузки конденсатора
KH(Nc) :=
    for i ∈ 0 .. Nc - 1
        K[0, i] ← C_Table[5, i]/C_Table[4, i]
    K
KH(Nc) = [0.588235, 0.2, 0.56, 0.036, 0.036, 0.024, 0.1, 0.033, 0.225]
# Коэффициент режима работы, зависящей от электрической нагрузки
KP(Nc) :=
    for i ∈ 0 .. Nc - 1
        A ← 5.909*10^-7
        B ← 14.3
        Nt ← 398
        G ← 1
        Ns ← 0.3
        H ← 3
        K[0, i] ← A*((KH(Nc)[0, i]/Ns)^H + 1)*exp(B*((C_Table[6, i] + 273)/Nt)^G)
    K
KP(Nc) = [0.32281, 0.0490078, 0.283707, 0.0378713, 0.0378713, 0.0378254, 0.0392062, 0.0378563, 0.0537554]
# Температурный коэффициент
KT(Nc) :=
    for i ∈ 0 .. Nc - 1
        K[0, i] ← 1/exp(-Ea/(8.617*10^5)*(1/(C_Table[6, i] + 273) - 1/298))
    K
KT(Nc) = [1, 1, 1, 1, 1, 1, 1, 1, 1]
# Расчет коэффициента зависящего от номинальной емкости
KC(Nc) :=
    for i ∈ 0 .. Nc - 1
        x ← C_Table[3, i]*10^12
        K[0, i] ← 0.4*x^0.12
    K
KC(Nc) = [3.33205, 1.59243, 2.76732, 0.585714, 0.527303, 0.916347, 1.20798, 0.69512, 2.30755]
# Интесивность отказов для одного элемента, с учетом коэффициентов
λC(Nc) :=
    for i ∈ 0 .. Nc - 1
        λ[0, i] ← C_Table[0, i]*C_Table[2, i]*KP(Nc)[0, i]*KC(Nc)[0, i]*KЭ*KП
    λ
λC(Nc) = [9.20137e-5, 4.66336e-6, 3.73124e-5, 2.21815e-5, 3.32824e-6, 1.11956e-7, 1.52974e-7, 4.38574e-6, 2.35806e-6]
λ_C := sum(λC(Nc)) = 0.000166508
1/λ_C = 6005.72
## Микросхемы
Nm := 11
Kкор := 3
DD_Table := READPRN("../Плата Main-CPU/ExportMathcad/DMainCpu.txt")  # Получение таблицы из  exsel
Kэ := 5  # Коэффициент зависящий от эксплутации (Железная дорога, механические (машины)
Kп := 1  # Коэффициент зависящий от производства (Военная приемка)
# Колличество в схеме
#
# Время наработки до отказа
# Интенсивность отказа
#
# Рабочая температура
# Придельная температура
#
# Рабочее напряжение
# Придельное напряжение
# Колличество элементов
# Kv
DD_Table = [
    1, 1, 1, 1, 1, 1, 2, 2, 1, 1, 2;
    55555556, 35714286, 35714286, 35714286, 35714286, 35714286, 35714286, 35714286, 35714286, 35714286, 35714286;
    1.8e-8, 2.8e-8, 2.8e-8, 2.8e-8, 2.8e-8, 2.8e-8, 2.8e-8, 2.8e-8, 2.8e-8, 2.8e-8, 2.8e-8;
    35, 35, 35, 35, 35, 35, 35, 35, 35, 35, 35;
    85, 85, 85, 120, 85, 85, 85, 85, 125, 150, 150;
    8, 24, 104, 6, 4, 16, 8, 8, 6, 12, 9;
    8, 32, 114, 8, 4, 16, 8, 8, 8, 16, 16;
    10000, 10000, 32, 1000, 100, 100, 100, 100, 100, 100, 100;
    1, 1, 1, 1, 1, 1, 1, 1, 1, 1, 1
]
## Температурный коэффициент К_t
Kt(Nm) :=
    for i ∈ 0 .. Nm - 1
        if i ≤ 2
            B ← 0.021
            K[0, i] ← exp(B*(DD_Table[3, i] - 25))
            i ← i + 1
        B ← 0.023
        K[0, i] ← exp(B*(DD_Table[3, i] - 25))
    K
Kt(Nm) = [1.23368, 1.23368, 1.23368, 1.2586, 1.2586, 1.2586, 1.2586, 1.2586, 1.2586, 1.2586, 1.2586]
## Коэфициент нагрузки К_н
Kобл(Nm) :=
    for i ∈ 0 .. Nm - 1
        K[0, i] ← DD_Table[5, i]/DD_Table[6, i]
    K
Kобл(Nm) = [1, 0.75, 0.912281, 0.75, 1, 1, 1, 1, 0.75, 0.75, 0.5625]
## Коэффициент, зависящий от коэффициента нагрузки К_p
Kp(Nm) :=
    for i ∈ 0 .. Nm - 1
        if i ≤ 2
            B ← 0.021
            t[0, i] ← DD_Table[3, i] + 30
            K[0, i] ← 0.045*exp(3.1*Kобл(Nm)[0, i])*exp(B*(t[0, i] - 25))
            i ← i + 1
        B ← 0.023
        t[0, i] ← DD_Table[3, i] + 30
        K[0, i] ← 0.045*exp(3.1*Kобл(Nm)[0, i])*exp(B*(t[0, i] - 25))
    K
Kp(Nm) = [2.31384, 1.06599, 1.76293, 1.15478, 2.50655, 2.50655, 2.50655, 2.50655, 1.15478, 1.15478, 0.64575]
## Коэффициент, зависящий от количества элементов микросхемы К_ис
Kис(Nm) :=
    for i ∈ 0 .. Nm - 1
        if i == 0
            A ← 1.113
            B ← 0.128
            K[0, i] ← A*DD_Table[7, i]^S
            i ← i + 1
        if i ≤ 2
            A ← 0.336
            S ← 0.288
            K[0, i] ← A*DD_Table[7, i]^S
            i ← i + 1
        A ← 0.478
        S ← 0.253
        K[0, i] ← A*DD_Table[7, i]^S
    K
Kис(Nm) = [1.113, 4.76803, 0.911638, 2.74428, 1.5326, 1.5326, 1.5326, 1.5326, 1.5326, 1.5326, 1.5326]
## Интесивность отказов для группы элемента, с учетом коэффициентов
λd(Nm) :=
    for i ∈ 0 .. Nm - 1
        λ[0, i] ← DD_Table[0, i]*DD_Table[2, i]*Kt(Nm)[0, i]*Kис(Nm)[0, i]*Kкор*DD_Table[8, i]*Kэ*Kп
    λ
λd(Nm) = [3.70733e-7, 2.47053e-6, 4.72361e-7, 1.45066e-6, 8.10149e-7, 8.10149e-7, 1.6203e-6, 1.6203e-6, 8.10149e-7, 8.10149e-7, 1.6203e-6]
λ_DD := sum(λd(Nm)) = 1.28658e-5
1/λ_DD = 77725.6
## Катушка
N_L := 1
L_Table := READPRN("../Плата Main-CPU/ExportMathcad/LMainCpu.txt")  # Получение таблицы из  exsel
L_Table = [2; 100000000; 1e-8; 0.5; 0.8; 35]
## Коэффициент нагрузки К_н
L_KH :=
    for i ∈ 0 .. N_L - 1
        K[0, i] ← L_Table[3, i]/L_Table[4, i]
    K
L_KH = [0.625]
## Коэффициент зависящий от коэффициента нагрузки К_р
L_KP :=
    for i ∈ 0 .. N_L - 1
        K[0, i] ← 0.46 + 0.012*(50 - L_Table)[5, i]^1.3 + 0.54*L_KH[0, i]*exp(0.2*(50 - L_Table)[5, i]^0.8)
    K
L_KP = [2.79893]
λ_L := L_Table[2, 0]*L_Table[0, 0]*L_KP[0, 0]*Kэ = 2.79893e-7
1/λ_L = 3572795
## Рeзисторы
N_R := 15
R_Table := READPRN("../Плата Main-CPU/ExportMathcad/RMainCpu.txt")
R_Table = [
    7, 36, 2, 1, 2, 1, 16, 4, 2, 2, 4, 9, 2, 8, 12;
    29411765, 29411765, 29411765, 29411765, 29411765, 29411765, 29411765, 29411765, 29411765, 29411765, 29411765, 29411765, 29411765, 29411765, 29411765;
    3.4e-8, 3.4e-8, 3.4e-8, 3.4e-8, 3.4e-8, 3.4e-8, 3.4e-8, 3.4e-8, 3.4e-8, 3.4e-8, 3.4e-8, 3.4e-8, 3.4e-8, 3.4e-8, 3.4e-8;
    0.25, 0.1, 0.1, 0.1, 0.125, 0.1, 0.1, 0.1, 0.125, 0.1, 0.1, 0.1, 0.25, 0.25, 0.25;
    0.125, 0.1, 0.054, 0.054, 0.054, 0.00036, 0.1, 0.1, 0.01906, 0.051, 0.1, 0.1, 0.0504, 0.051, 0.24;
    35, 35, 35, 35, 35, 35, 35, 35, 35, 35, 35, 35, 35, 35, 35;
    0.5, 0.5, 0.5, 0.5, 0.5, 2.7, 0.5, 0.5, 0.5, 0.5, 0.5, 0.5, 0.5, 0.5, 0.5
]
## Коэффициент нагрузки К_н
R_KH(N_R) :=
    for i ∈ 0 .. N_R - 1
        K[0, i] ← R_Table[4, i]/R_Table[3, i]
    K
R_KH(N_R) = [0.5, 1, 0.54, 0.54, 0.432, 0.0036, 1, 1, 0.15248, 0.51, 1, 1, 0.2016, 0.204, 0.96]
R_KP(N_R) :=
    A ← 0.260
    B ← 0.5078
    Nt ← 343
    G ← 9.278
    Ns ← 0.878
    J ← 1
    H ← 0.886
    for i ∈ 0 .. N_R - 1
        K[0, i] ← A*exp(B*((R_Table[5, i] + 273)/Nt)^G)*exp(((R_KH(N_R)[0, i]/Ns)*((R_Table[5, i] + 273)/273)^J)^H)
    K
R_KP(N_R) = [0.61614, 1.09282, 0.646231, 0.646231, 0.567583, 0.316174, 1.09282, 1.09282, 0.396904, 0.623553, 1.09282, 1.09282, 0.424082, 0.425435, 1.0454]
λR(N_R) :=
    for i ∈ 0 .. N_R - 1
        λ[0, i] ← R_Table[2, i]*R_Table[0, i]*R_KP(N_R)[0, i]*R_Table[6, i]*Kэ*Kп
    λ
λ_R := sum(λR(N_R)) = 8.78356e-6
1/λ_R = 113849
λR(N_R) = [3.66603e-7, 3.34402e-6, 1.09859e-7, 5.49296e-8, 9.64891e-8, 1.45124e-7, 1.48623e-6, 3.71558e-7, 6.74738e-8, 1.06004e-7, 3.71558e-7, 8.36006e-7, 7.2094e-8, 2.89296e-7, 1.06631e-6]
## Оптоэлектронная микросхема
N_U := 3
U_Table := READPRN("../Плата Main-CPU/ExportMathcad/UMainCpu.txt")
U_Table = [11, 1, 3; 5263158, 5263158, 5263158; 1.9e-7, 1.9e-7, 1.9e-7; 35, 35, 35]
λU :=
    for i ∈ 0 .. N_U - 1
        λ[0, i] ← U_Table[2, i]*U_Table[0, i]*Kэ*Kп
    λ
λU = [1.045e-5, 9.5e-7, 2.85e-6]
λ_U := sum(λU) = 1.425e-5
1/λ_U = 70175.4
## Диоды
N_VD := 6
VD_Table := READPRN("../Плата Main-CPU/ExportMathcad/VDMainCpu.txt")
VD_Table = [
    4, 4, 14, 4, 1, 1;
    243902439, 243902439, 243902439, 40000000, 5405405, 5405405;
    4.1e-9, 4.1e-9, 4.1e-9, 2.5e-8, 1.85e-7, 1.85e-7;
    0.152, 33.3333, 80, 0.45, 0.02, 0.02;
    0.15, 14, 15, 0.001, 0.02, 0.02;
    1, 1, 1, 1, 1, 1;
    1, 2, 2, 0.6, 0.6, 0.6;
    35, 35, 35, 35, 35, 35
]
VD_KH(N_VD) :=
    for i ∈ 0 .. N_VD - 1
        K[0, i] ← VD_Table[4, i]/VD_Table[3, i]
    K
VD_KH(N_VD) = [0.986842, 0.42, 0.1875, 0.00222222, 1, 1]
VD_KP(N_VD) :=
    for i ∈ 0 .. N_VD - 1
        if i < 1
            A ← 2.1935
            Nt ← -800
            Tm ← 448
            L ← 14.0
            Δt ← 150
            K[0, i] ← A*exp(Nt/(273 + VD_Table[7, i] + Δt*VD_KH(N_VD)[0, i]) + ((273 + VD_Table[7, i] + Δt*VD_KH(N_VD)[0, i])/Tm)^L)
            i ← i + 1
        if i ≤ 4
            A ← 44.1025
            Nt ← -2138
            Tm ← 448
            L ← 17.7
            Δt ← 150
            K[0, i] ← A*exp(Nt/(273 + VD_Table[7, i] + Δt*VD_KH(N_VD)[0, i]) + ((273 + VD_Table[7, i] + Δt*VD_KH(N_VD)[0, i])/Tm)^L)
            i ← i + 1
        Ea ← 0.6
        k ← 8.625*10^-5
        m ← 1.5
        tp ← VD_Table[7, i] + VD_KH(N_VD)[0, i]*20
        tp0 ← 45
        K[0, i] ← VD_KH(N_VD)[0, i]^m*exp(Ea/k*(1/(tp0 + 273) - 1/(tp + 273)))
    K
VD_KP(N_VD) = [1.36813, 0.143592, 0.0766868, 0.0430155, 1.81571, 1.94828]
VD_KU(N_VD) :=
    for i ∈ 0 .. N_VD - 1
        K[0, i] ← 1/(2.11 - 1.11*VD_KH(N_VD)[0, i]) if VD_KH(N_VD)[0, i] > 0.6
        K[0, i] ← 0.7
    K
VD_KU(N_VD) = [0.7, 0.7, 0.7, 0.7, 0.7, 0.7]
λVD(N_VD) :=
    for i ∈ 0 .. N_VD - 1
        if i < 1
            λ[0, i] ← VD_Table[0, i]*VD_Table[2, i]*VD_KP(N_VD)[0, i]*Kэ*Kп
            i ← i + 1
        if i < 5
            λ[0, i] ← VD_Table[0, i]*VD_Table[2, i]*VD_KP(N_VD)[0, i]*VD_Table[5, i]*VD_Table[6, i]*Kэ*Kп
            i ← i + 1
        λ[0, i] ← VD_Table[0, i]*VD_Table[2, i]*VD_KP(N_VD)[0, i]*Kэ*Kп
    λ
λVD(N_VD) = [1.12187e-7, 2.35491e-8, 4.40182e-8, 1.29047e-8, 1.00772e-6, 1.80216e-6]
λ_VD := sum(λVD(N_VD)) = 3.00253e-6
1/λ_VD = 333052
## Транзисторы
N_VT := 1
VT_Table := READPRN("../Плата Main-CPU/ExportMathcad/VTMainCpu.txt")
VT_Table = [1; 409500410; 2.442e-9; 350; 25; 0.7; 35]
VT_KH(N_VT) :=
    for i ∈ 0 .. N_VT - 1
        K[0, i] ← VT_Table[4, i]/VT_Table[3, i]
    K
VT_KH(N_VT) = [0.0714286]
VT_KP(N_VT) :=
    A ← 5.2
    Nt ← -1162
    Tm ← 448
    L ← 13.8
    Δt ← 150
    for i ∈ 0 .. N_VT - 1
        K[0, i] ← A*exp(Nt/(273 + VT_Table[6, i] + Δt*VT_KH(N_VT)[0, i]) + ((273 + VT_Table[6, i] + Δt*VT_KH(N_VT)[0, i])/Tm)^L)
    K
VT_KP(N_VT) = [0.136951]
λVT(N_VT) :=
    for i ∈ 0 .. N_VT - 1
        λ[0, i] ← VT_Table[2, i]*VT_Table[0, i]*VT_KP(N_VT)[0, i]*VT_Table[5, i]*Kэ*Kп
    λ
λVT(N_VT) = [1.17052e-9]
λ_VT := sum(λVT(N_VT)) = 1.17052e-9
1/λ_VT = 854323130
## Разъемы
t_p := 30
N_X := 5
X_Table := READPRN("../Плата Main-CPU/ExportMathcad/XMainCpu.txt")
X_Table = [
    7, 9, 1, 5, 1;
    96153846, 96153846, 96153846, 96153846, 96153846;
    1.04e-8, 1.04e-8, 1.04e-8, 1.04e-8, 1.04e-8;
    1.5, 1.5, 1.5, 15, 5;
    1, 1, 1, 1, 1;
    6, 18, 10, 8, 5;
    35, 35, 35, 35, 35;
    1000, 1000, 1000, 1000, 1000
]
K_H(N_X) :=
    for i ∈ 0 .. N_X - 1
        K[0, i] ← X_Table[4, i]/X_Table[3, i]
    K
K_H(N_X) = [0.666667, 0.666667, 0.666667, 0.0666667, 0.2]
K_P :=
    for i ∈ 0 .. N_X - 1
        K[0, i] ← exp(9000*(1/(298 + t_p) - 1/(273 + X_Table[6, i] + t_p*exp(-1.8*(1 - K_H(N_X)[0, i])))))
    K
K_P = [0.741559, 0.741559, 0.741559, 0.283439, 0.325424]
K_K :=
    for i ∈ 0 .. N_X - 1
        K[0, i] ← exp((0.1*(X_Table[5, i] - 1))^0.51064)
    K
K_K = [2.0176, 3.71071, 2.57956, 2.30134, 1.87071]
K_n :=
    for i ∈ 0 .. N_X - 1
        K[0, i] ← 0.32*exp(0.0028*X_Table[7, i])
    K
K_n = [5.26229, 5.26229, 5.26229, 5.26229, 5.26229]
λx :=
    for i ∈ 0 .. N_X - 1
        K[0, i] ← X_Table[0, i]*X_Table[2, i]*K_P[0, i]*K_K[0, i]*K_n[0, i]*Kэ*Kп
    K
λx = [2.86588e-6, 6.77678e-6, 5.23444e-7, 8.92458e-7, 1.66584e-7]
λ_X := sum(λx) = 1.12251e-5
1/λ_X = 89085.7
## Резонатор
N_Z := 3
Z_Table := READPRN("../Плата Main-CPU/ExportMathcad/ZMainCpu.txt")
Z_Table = [1, 1, 1; 38461538, 38461538, 38461538; 2.6e-8, 2.6e-8, 2.6e-8; 35, 35, 35]
Kt_t :=
    for i ∈ 0 .. N_Z - 1
        K[0, i] ← exp(0.017*Z_Table[3, i])
    K
Kt_t = [1.81303, 1.81303, 1.81303]
λZ :=
    for i ∈ 0 .. N_Z - 1
        K[0, i] ← Z_Table[0, i]*Z_Table[2, i]*Kt_t[0, i]*Kэ*Kп
    K
λZ = [2.35694e-7, 2.35694e-7, 2.35694e-7]
λ_Z := sum(λZ) = 7.07082e-7
PL_Table := READPRN("../Плата Main-CPU/ExportMathcad/Plata.txt")
PL_Table = [1.7e-11; 4; 724; 0; 35]
λ_PL := PL_Table[0, 0]*(PL_Table[2, 0]*PL_Table[1, 0] + PL_Table[3, 0]*(PL_Table[1, 0] + 13))*(0.061*PL_Table[4, 0] - 0.525)*Kэ*Kп = 3.96318e-7
λ_VT = 1.17052e-9
λ_X = 1.12251e-5
λ_VD = 3.00253e-6
λ_R = 8.78356e-6
λ_U = 1.425e-5
λ_C = 0.000166508
λ_DD = 1.28658e-5
λ_Z = 7.07082e-7
λ_PL = 3.96318e-7
λ := λ_C + λ_DD + λ_R + λ_U + λ_VD + λ_VT + λ_X + λ_Z + λ_PL = 0.00021774
1/λ = 4592.64
