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# Плата Силовая
# Конденсаторы
KЭ := 5  # Коэффициент зависящий от эксплутации (Железная дорога, механические (машины)
KП := 1  # Коэффициент зависящий от производства (Военная приемка)
Ea := 0.35  # Энергий активации
Nc := 9
C_Table := READPRN("../Плата Силовая/ExportMathcad/CStrength.txt")  # Получение таблицы из  exsel
C_Table = [
    3, 9, 1, 6, 10, 2, 1, 1, 1;
    5780346, 5780346, 5780346, 200000, 200000, 200000, 3098504, 3098504, 3098504;
    1.73e-7, 1.73e-7, 1.73e-7, 1e-9, 1e-9, 1e-9, 3.23e-7, 3.23e-7, 3.23e-7;
    0.00022, 0.0033, 8.2e-9, 2.2e-6, 3.3e-8, 2.2e-7, 1e-7, 4.7e-9, 8.2e-9;
    50, 35, 400, 63, 40, 400, 50, 25, 50;
    30, 30, 350, 30, 30, 350, 30, 1, 5;
    35, 35, 35, 35, 35, 35, 35, 35, 35
]
# Коэффициент нагрузки конденсатора
KH(Nc) :=
    for i ∈ 0 .. Nc - 1
        K[0, i] ← C_Table[5, i]/C_Table[4, i]
    K
KH(Nc) = [0.6, 0.857143, 0.875, 0.47619, 0.75, 0.875, 0.6, 0.04, 0.1]
# Коэффициент режима работы, зависящей от электрической нагрузки
KP(Nc) :=
    for i ∈ 0 .. Nc - 1
        if i ≤ 2
            A ← 3.59*10^-2
            B ← 4.09
            Nt ← 358
            G ← 5.9
            Ns ← 0.55
            H ← 3
            K[0, i] ← A*((KH(Nc)[0, i]/Ns)^H + 1)*exp(B*((C_Table[6, i] + 273)/Nt)^G)
            i ← i + 1
        if i ≤ 5
            A ← 9.583*10^-3
            B ← 2.5
            Nt ← 358
            G ← 18
            Ns ← 0.4
            H ← 5
            K[0, i] ← A*((KH(Nc)[0, i]/Ns)^H + 1)*exp(B*((C_Table[6, i] + 273)/Nt)^G)
            i ← i + 1
        A ← 5.909*10^-7
        B ← 14.3
        Nt ← 398
        G ← 1
        Ns ← 0.3
        H ← 3
        K[0, i] ← A*((KH(Nc)[0, i]/Ns)^H + 1)*exp(B*((C_Table[6, i] + 273)/Nt)^G)
    K
KP(Nc) = [0.444339, 0.925122, 0.971818, 0.0383925, 0.273688, 0.578399, 0.340254, 0.0378956, 0.0392062]
# Температурный коэффициент
KT(Nc) :=
    for i ∈ 0 .. Nc - 1
        K[0, i] ← 1/exp(-Ea/(8.617*10^5)*(1/(C_Table[6, i] + 273) - 1/298))
    K
KT(Nc) = [1, 1, 1, 1, 1, 1, 1, 1, 1]
# Расчет коэффициента зависящего от номинальной емкости
KC(Nc) :=
    for i ∈ 0 .. Nc - 1
        if i ≤ 2
            x ← C_Table[3, i]*10^6
            K[0, i] ← 0.2*x^0.23
            i ← i + 1
        if i ≤ 5
            x ← C_Table[3, i]*10^6
            K[0, i] ← x^0.05
            i ← i + 1
        x ← C_Table[3, i]*10^12
        K[0, i] ← 0.4*x^0.12
    K
KC(Nc) = [0.691492, 1.2891, 0.0662532, 1.04021, 0.84319, 0.927088, 1.59243, 1.10335, 1.17955]
# Интесивность отказов для одного элемента, с учетом коэффициентов
λC(Nc) :=
    for i ∈ 0 .. Nc - 1
        λ[0, i] ← C_Table[0, i]*C_Table[2, i]*KP(Nc)[0, i]*KC(Nc)[0, i]*KЭ*KП
    λ
λC(Nc) = [7.97331e-7, 9.28423e-6, 5.5694e-8, 1.19809e-9, 1.15386e-8, 5.36227e-9, 8.75056e-7, 6.75263e-8, 7.4687e-8]
λ_C := sum(λC(Nc)) = 1.11726e-5
1/λ_C = 89504.5
## Микросхемы
Nm := 3
Kкор := 3
DD_Table := READPRN("../Плата Силовая/ExportMathcad/DStrength.txt")  # Получение таблицы из  exsel
Kэ := 5  # Коэффициент зависящий от эксплутации (Железная дорога, механические (машины)
Kп := 1  # Коэффициент зависящий от производства (Военная приемка)
# Колличество в схеме
#
# Время наработки до отказа
# Интенсивность отказа
#
# Рабочая температура
# Придельная температура
#
# Рабочее напряжение
# Придельное напряжение
# Колличество элементов
# Kv
DD_Table = [
    1, 1, 1;
    35714286, 35714286, 35714286;
    2.8e-8, 2.8e-8, 2.8e-8;
    35, 35, 35;
    125, 125, 85;
    30, 16, 5;
    100, 18, 61;
    100, 100, 100;
    1, 1, 1
]
## Температурный коэффициент К_t
Kt(Nm) :=
    B ← 0.023
    for i ∈ 0 .. Nm - 1
        K[0, i] ← exp(B*(DD_Table[3, i] - 25))
    K
Kt(Nm) = [1.2586, 1.2586, 1.2586]
## Коэфициент нагрузки К_н
Kобл(Nm) :=
    for i ∈ 0 .. Nm - 1
        K[0, i] ← DD_Table[5, i]/DD_Table[6, i]
    K
Kобл(Nm) = [0.3, 0.888889, 0.0819672]
## Коэффициент, зависящий от коэффициента нагрузки К_p
Kp(Nm) :=
    B ← 0.023
    for i ∈ 0 .. Nm - 1
        t[0, i] ← DD_Table[3, i] + 30
        K[0, i] ← 0.045*exp(3.1*Kобл(Nm)[0, i])*exp(B*(t[0, i] - 25))
    K
Kp(Nm) = [0.286192, 1.77618, 0.145585]
## Коэффициент, зависящий от количества элементов микросхемы К_ис
Kис(Nm) :=
    A ← 0.478
    S ← 0.253
    for i ∈ 0 .. Nm - 1
        K[0, i] ← A*DD_Table[7, i]^S
    K
Kис(Nm) = [1.5326, 1.5326, 1.5326]
## Интесивность отказов для группы элемента, с учетом коэффициентов
λd(Nm) :=
    for i ∈ 0 .. Nm - 1
        λ[0, i] ← DD_Table[0, i]*DD_Table[2, i]*Kt(Nm)[0, i]*Kис(Nm)[0, i]*Kкор*DD_Table[8, i]*Kэ*Kп
    λ
λd(Nm) = [8.10149e-7, 8.10149e-7, 8.10149e-7]
λ_DD := sum(λd(Nm)) = 2.43045e-6
1/λ_DD = 411447
## Предохранители
N_FU := 2
FU_Table := READPRN("../Плата Силовая/ExportMathcad/FUStrength.txt")
FU_Table = [1, 1; 90909091, 90909091; 1.1e-8, 1.1e-8; 35, 35]
λFU :=
    for i ∈ 0 .. N_FU - 1
        λ[0, i] ← FU_Table[2, i]*FU_Table[0, i]*(0.061*FU_Table[3, i] - 0.525)*Kэ*Kп
    λ
λFU = [8.855e-8, 8.855e-8]
λ_FU := sum(λFU) = 1.771e-7
1/λ_FU = 5646527
## Катушка индкутивности
N_L := 1
L_Table := READPRN("../Плата Силовая/ExportMathcad/LStrength.txt")  # Получение таблицы из  exsel
L_Table = [1; 100000000; 1e-8; 2.8; 3.2; 35]
## Коэффициент нагрузки К_н
L_KH :=
    for i ∈ 0 .. N_L - 1
        K[0, i] ← L_Table[3, i]/L_Table[4, i]
    K
L_KH = [0.875]
## Коэффициент зависящий от коэффициента нагрузки К_р
L_KP :=
    for i ∈ 0 .. N_L - 1
        K[0, i] ← 0.46 + 0.012*(50 - L_Table)[5, i]^1.3 + 0.54*L_KH[0, i]*exp(0.2*(50 - L_Table)[5, i]^0.8)
    K
L_KP = [3.57226]
λ_L := L_Table[2, 0]*L_Table[0, 0]*L_KP[0, 0]*Kэ = 1.78613e-7
1/λ_L = 5598697
## Рeзисторы
N_R := 6
R_Table := READPRN("../Плата Силовая/ExportMathcad/RStrength.txt")
R_Table = [
    1, 2, 4, 2, 1, 5;
    250000, 250000, 250000, 29411765, 29411765, 29411765;
    4e-6, 4e-6, 4e-6, 3.4e-8, 3.4e-8, 3.4e-8;
    2, 1, 1, 0.25, 0.125, 0.25;
    0.1, 0.1, 0.1, 0.01, 0.01, 0.01;
    50, 50, 50, 50, 50, 50;
    1, 1, 1, 0.5, 0.5, 0.5
]
## Коэффициент нагрузки К_н
R_KH(N_R) :=
    for i ∈ 0 .. N_R - 1
        K[0, i] ← R_Table[4, i]/R_Table[3, i]
    K
R_KH(N_R) = [0.05, 0.1, 0.1, 0.04, 0.08, 0.04]
R_KP(N_R) :=
    for i ∈ 0 .. N_R - 1
        if i ≤ 2
            A ← 0.260
            B ← 0.5078
            Nt ← 343
            G ← 9.278
            Ns ← 0.878
            J ← 1
            H ← 0.886
            K[0, i] ← A*exp(B*((R_Table[5, i] + 273)/Nt)^G)*exp(((R_KH(N_R)[0, i]/Ns)*((R_Table[5, i] + 273)/273)^J)^H)
            i ← i + 1
        A ← 0.06
        B ← 1.616
        Nt ← 328
        G ← 2.746
        Ns ← 0.622
        J ← 1.198
        H ← 0.770
        K[0, i] ← A*exp(B*((R_Table[5, i] + 273)/Nt)^G)*exp(((R_KH(N_R)[0, i]/Ns)*((R_Table[5, i] + 273)/273)^J)^H)
    K
R_KP(N_R) = [0.381126, 0.411925, 0.411925, 0.325306, 0.359362, 0.325306]
λR(N_R) :=
    for i ∈ 0 .. N_R - 1
        if i == 0
            Km ← 1.5
            KΔ ← 1
            λ[0, i] ← R_Table[2, i]*R_Table[0, i]*R_KP(N_R)[0, i]*R_Table[6, i]*Km*KΔ*Kэ*Kп
            i ← i + 1
        λ[0, i] ← R_Table[2, i]*R_Table[0, i]*R_KP(N_R)[0, i]*R_Table[6, i]*Kэ*Kп
    λ
λ_R := sum(λR(N_R)) = 6.10889e-5
1/λ_R = 16369.6
λR(N_R) = [1.14338e-5, 1.6477e-5, 3.2954e-5, 5.5302e-8, 3.05458e-8, 1.38255e-7]
## Диоды
N_VD := 6
VD_Table := READPRN("../Плата Силовая/ExportMathcad/VDStrength.txt")
VD_Table = [
    1, 4, 1, 2, 4, 2;
    243902439, 243902439, 243902439, 10989011, 10989011, 10989011;
    4.1e-9, 4.1e-9, 4.1e-9, 9.1e-8, 9.1e-8, 9.1e-8;
    169, 123, 0.6, 0.02, 8, 0.2;
    30, 30, 0.5, 0.01, 5, 0.125;
    1, 1, 1, 1.5, 1.5, 1;
    2, 2, 0.6, 0.6, 1, 0.6;
    35, 35, 35, 35, 35, 35
]
VD_KH(N_VD) :=
    for i ∈ 0 .. N_VD - 1
        K[0, i] ← VD_Table[4, i]/VD_Table[3, i]
    K
VD_KH(N_VD) = [0.177515, 0.243902, 0.833333, 0.5, 0.625, 0.625]
VD_KP(N_VD) :=
    for i ∈ 0 .. N_VD - 1
        if i < 3
            A ← 2.193
            Nt ← -800
            Tm ← 448
            L ← 14.0
            Δt ← 150
            K[0, i] ← A*exp(Nt/(273 + VD_Table[7, i] + Δt*VD_KH(N_VD)[0, i]) + ((273 + VD_Table[7, i] + Δt*VD_KH(N_VD)[0, i])/Tm)^L)
            i ← i + 1
        A ← 44.1025
        Nt ← -2138
        Tm ← 448
        L ← 17.7
        Δt ← 150
        K[0, i] ← A*exp(Nt/(273 + VD_Table[7, i] + Δt*VD_KH(N_VD)[0, i]) + ((273 + VD_Table[7, i] + Δt*VD_KH(N_VD)[0, i])/Tm)^L)
    K
VD_KP(N_VD) = [0.204206, 0.220691, 0.643056, 0.17669, 0.249111, 0.249111]
VD_KU(N_VD) :=
    for i ∈ 0 .. N_VD - 1
        K[0, i] ← 1/(2.11 - 1.11*VD_KH(N_VD)[0, i]) if VD_KH(N_VD)[0, i] > 0.6
        K[0, i] ← 0.7
    K
VD_KU(N_VD) = [0.7, 0.7, 0.7, 0.7, 0.7, 0.7]
λVD(N_VD) :=
    for i ∈ 0 .. N_VD - 1
        if i ≤ 2
            λ[0, i] ← VD_Table[2, i]*VD_Table[0, i]*VD_KP(N_VD)[0, i]*Kэ*Kп
            i ← i + 1
        λ[0, i] ← VD_Table[2, i]*VD_Table[0, i]*VD_KP(N_VD)[0, i]*Kэ*Kп*VD_Table[5, i]*VD_Table[6, i]*VD_KU(N_VD)[0, i]
    λ
λVD(N_VD) = [4.18623e-9, 1.80966e-8, 1.31826e-8, 1.01297e-7, 4.76051e-7, 9.52102e-8]
λ_VD := sum(λVD(N_VD)) = 7.08024e-7
1/λ_VD = 1412382
## Транзисторы
N_VT := 3
VT_Table := READPRN("../Плата Силовая/ExportMathcad/VTStrength.txt")
VT_Table = [
    2, 2, 5;
    22727273, 15384615, 15384615;
    4.4e-8, 6.5e-8, 6.5e-8;
    0.5, 5, 520;
    0.5, 4.5, 200;
    0.7, 0.7, 0.7;
    0.8, 0.8, 2.5;
    35, 35, 35
]
VT_KH :=
    for i ∈ 0 .. N_VT - 1
        k[0, i] ← VT_Table[4, i]/VT_Table[3, i]
    k
VT_KH = [1, 0.9, 0.384615]
VT_KU :=
    for i ∈ 0 .. N_VT - 1
        if VT_KH[0, i] > 0.5
            K[0, i] ← 1/(2.42 - 2.09*VT_KH[0, i])
            i ← i + 1
        K[0, i] ← 0.5
    K
VT_KU = [3.0303, 1.85529, 0.5]
VT_KP :=
    for i ∈ 0 .. N_VT - 1
        if i == 0
            A ← 5.2
            Nt ← -1162
            Tm ← 448
            L ← 13.8
            Δt ← 150
            K[0, i] ← A*exp(Nt/(273 + VT_Table[7, i] + Δt*VT_KH[0, i]) + ((273 + VT_Table[7, i] + Δt*VT_KH[0, i])/Tm)^L)
            i ← i + 1
        A ← 5.2
        Nt ← -1162
        Tm ← 448
        L ← 13.8
        Δt ← 150
        K[0, i] ← A*exp(Nt/(273 + VT_Table[7, i] + Δt*VT_KH[0, i]) + ((273 + VT_Table[7, i] + Δt*VT_KH[0, i])/Tm)^L)
    K
VT_KP = [1.5963, 0.888828, 0.230351]
λVT :=
    for i ∈ 0 .. N_VT - 1
        if i == 0
            λ[0, i] ← VT_Table[2, i]*VT_Table[0, i]*VT_KP[0, i]*Kэ*Kп*VT_Table[5, i]*VT_Table[6, i]*VT_KU[0, i]
            i ← i + 1
        λ[0, i] ← VT_Table[2, i]*VT_Table[0, i]*VT_KP[0, i]*Kэ*Kп*VD_Table[5, i]
    λ
λVT = [1.1919e-6, 5.77738e-7, 3.7432e-7]
λ_VT := sum(λVT) = 2.14396e-6
1/λ_VT = 466426
## Плата
PL_Table := READPRN("../Плата Силовая/ExportMathcad/Plata.txt")
PL_Table = [1.7e-11; 4; 623; 0; 35]
λ_PL := PL_Table[0, 0]*(PL_Table[2, 0]*PL_Table[1, 0] + PL_Table[3, 0]*(PL_Table[1, 0] + 13))*(0.061*PL_Table[4, 0] - 0.525)*Kэ*Kп = 3.4103e-7
## Трансформаторы
N_T := 2
tp :=
    for i ∈ 0 .. N_T - 1
        tp[0, i] ← 0.5*55*(1*1 + 1)
    tp
tp = [55, 55]
T_Kp :=
    for i ∈ 0 .. N_T - 1
        A ← 0.81
        G ← 15.6
        Tm ← 329
        K[0, i] ← A*exp(((tp[0, i] + 35 + 273)/Tm)^G)
    K
T_Kp = [83.6646, 83.6646]
λT :=
    for i ∈ 0 .. N_T - 1
        λ[0, i] ← T_Kp[0, i]*Kэ*Kп*0.0072*10^-6
    λ
λT = [3.01192e-6, 3.01192e-6]
λ_T := sum(λT) = 6.02385e-6
λ_R = 6.10889e-5
λ_VD = 7.08024e-7
λ_FU = 1.771e-7
λ_VT = 2.14396e-6
λ_C = 1.11726e-5
λ_DD = 2.43045e-6
λ_L = 1.78613e-7
λ_PL = 3.4103e-7
λ := λ_C + λ_DD + λ_R + λ_VD + λ_VT + λ_PL + λ_FU + λ_L + λ_T = 8.42646e-5
1/λ = 11867.4
